<neuroml xmlns="http://www.neuroml.org/schema/neuroml2"  xmlns:xs="http://www.w3.org/2001/XMLSchema" xmlns:xsi="http://www.w3.org/2001/XMLSchema-instance" xsi:schemaLocation="http://www.neuroml.org/schema/neuroml2 https://raw.github.com/NeuroML/NeuroML2/development/Schemas/NeuroML2/NeuroML_v2beta5.xsd" id="AA0289">
    <include href="pas.channel.nml"/>
    <include href="na.channel.nml"/>
    <include href="kv.channel.nml"/>
    <cell id="ROTATED_AA0289_active">
        <notes>
    Cell AA0289 downloaded from Janelia MouseLight project (https://www.janelia.org/project-team/mouselight)
    and converted to NeuroML
    DOI of original cell: https://doi.org/10.25378/janelia.5527822

    NOTE: cells have been given a soma of diameter 20um for visualisation purposes
    However, no soma has been reconstructed from the original cells</notes>
        <property tag="JaneliaMouseLight:idString" value="AA0289"/>
        <property tag="JaneliaMouseLight:DOI" value="10.25378/janelia.5527822"/>
        <property tag="JaneliaMouseLight:sample_date" value="2017-06-28T21:36:40.000Z"/>
        <property tag="JaneliaMouseLight:sample_strain" value="C57BL/6J"/>
        <property tag="JaneliaMouseLight:label_virus" value="AAV2/1.FLEX-eGFP"/>
        <property tag="JaneliaMouseLight:label_fluorophore" value="eGFP"/>
        <morphology id="morph_AA0289">
            <segment id="0" name="soma">
                <proximal x="-1.432469e+03" y="1.363945e+03" z="-1.305909e+03" diameter="20.0"/>
                <distal x="-1.432469e+03" y="1.363945e+03" z="-1.305909e+03" diameter="20.0"/>
            </segment>
            <segment id="1001" name="axon_1001">
                <parent segment="0"/>
                <proximal x="-1.432469e+03" y="1.363945e+03" z="-1.305909e+03" diameter="2.0"/>
                <distal x="-1.432469e+03" y="1.363945e+03" z="-1.305909e+03" diameter="2.0"/>
            </segment>
            <segment id="1002" name="axon_1002">
                <parent segment="1001"/>
                <distal x="-1.433956e+03" y="1.363945e+03" z="-1.307705e+03" diameter="2.0"/>
            </segment>
            <segment id="1003" name="axon_1003">
                <parent segment="1002"/>
                <distal x="-1.432969e+03" y="1.355824e+03" z="-1.321273e+03" diameter="2.0"/>
            </segment>
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            <segmentGroup neuroLexId="GO:0030424" id="axon_group">
                <member segment="1001"/>
                <member segment="1002"/>
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            </segmentGroup>
            <segmentGroup neuroLexId="GO:0043025" id="soma_group">
                <member segment="0"/>
            </segmentGroup>
            <segmentGroup neuroLexId="GO:0030425" id="dendrite_group">
                <member segment="1000001"/>
                <member segment="1000002"/>
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            </segmentGroup>
        </morphology>
        <biophysicalProperties id="biophys">
            <membraneProperties>
                <channelDensity id="pas_chan" ionChannel="pas" condDensity="0.000142857 S_per_cm2" erev="-70.0 mV" ion="non_specific"/>
                <channelDensity id="na_chan" ionChannel="na" condDensity="0.1 S_per_cm2" erev="60.0 mV" ion="na"/>
                <channelDensity id="kv_chan" ionChannel="kv" condDensity="0.01 S_per_cm2" erev="-90.0 mV" ion="k"/>
                <spikeThresh value="10mV"/>
                <specificCapacitance value="1.0 uF_per_cm2"/>
                <initMembPotential value="-80 mV"/>
            </membraneProperties>
            <intracellularProperties>
                <resistivity value="100 ohm_cm"/>
            </intracellularProperties>
        </biophysicalProperties>
    </cell>
</neuroml>
