<neuroml xmlns="http://www.neuroml.org/schema/neuroml2"  xmlns:xs="http://www.w3.org/2001/XMLSchema" xmlns:xsi="http://www.w3.org/2001/XMLSchema-instance" xsi:schemaLocation="http://www.neuroml.org/schema/neuroml2 https://raw.github.com/NeuroML/NeuroML2/development/Schemas/NeuroML2/NeuroML_v2.3.xsd" id="Thalamus">
    <notes>Generated by NeuroMLlite v0.5.9
    Generated network: Thalamus
    Generation seed: 1234
    NeuroMLlite parameters:
        stim_amp = 1nA</notes>
    <include href="Thalamus__lems.xml"/>
    <pulseGenerator id="iclamp_0" delay="200ms" duration="500ms" amplitude="1nA"/>
    <pulseGenerator id="iclamp_1" delay="1000ms" duration="500ms" amplitude="1nA"/>
    <alphaCondSynapse id="ampa" tau_syn="2.0" e_rev="-10.0"/>
    <network id="Thalamus">
        <notes>NOTE: this is only a quick demo!! Do not use it for your research assuming an accurate conversion of the source data!!! </notes>
        <property tag="recommended_dt_ms" value="0.2"/>
        <property tag="recommended_duration_ms" value="2000.0"/>
        <population id="IAM" component="L23_E_comp" size="1" type="populationList">
            <property tag="radius" value="50"/>
            <property tag="name" value="Interanteromedial nucleus of the thalamus"/>
            <property tag="area" value="Thalamus"/>
            <property tag="region" value="IAM"/>
            <instance id="0">
                <location x="-227.174377061097857" y="-784.23245295750462" z="-3557.617914756941445"/>
            </instance>
        </population>
        <population id="CONTRA_IAM" component="L23_E_comp" size="1" type="populationList">
            <property tag="radius" value="50"/>
            <property tag="name" value="Interanteromedial nucleus of the thalamus"/>
            <property tag="area" value="Thalamus"/>
            <property tag="region" value="CONTRA_IAM"/>
            <instance id="0">
                <location x="229.051806559239111" y="-783.733916559316185" z="-3557.043178653941141"/>
            </instance>
        </population>
        <population id="LP" component="L23_E_comp" size="1" type="populationList">
            <property tag="radius" value="50"/>
            <property tag="name" value="Lateral posterior nucleus of the thalamus"/>
            <property tag="area" value="Thalamus"/>
            <property tag="region" value="LP"/>
            <instance id="0">
                <location x="-1602.991844758812022" y="-2322.63994722586267" z="-2124.880999509308367"/>
            </instance>
        </population>
        <population id="CONTRA_LP" component="L23_E_comp" size="1" type="populationList">
            <property tag="radius" value="50"/>
            <property tag="name" value="Lateral posterior nucleus of the thalamus"/>
            <property tag="area" value="Thalamus"/>
            <property tag="region" value="CONTRA_LP"/>
            <instance id="0">
                <location x="1603.900218015663086" y="-2322.693071430973305" z="-2124.858707724863507"/>
            </instance>
        </population>
        <population id="IMD" component="L23_E_comp" size="1" type="populationList">
            <property tag="radius" value="50"/>
            <property tag="name" value="Intermediodorsal nucleus of the thalamus"/>
            <property tag="area" value="Thalamus"/>
            <property tag="region" value="IMD"/>
            <instance id="0">
                <location x="-131.543193305852867" y="-1715.451249921560702" z="-3001.834556528096073"/>
            </instance>
        </population>
        <population id="CONTRA_IMD" component="L23_E_comp" size="1" type="populationList">
            <property tag="radius" value="50"/>
            <property tag="name" value="Intermediodorsal nucleus of the thalamus"/>
            <property tag="area" value="Thalamus"/>
            <property tag="region" value="CONTRA_IMD"/>
            <instance id="0">
                <location x="132.037836910158262" y="-1715.891440749189996" z="-3002.335959253511191"/>
            </instance>
        </population>
        <population id="PP" component="L23_E_comp" size="1" type="populationList">
            <property tag="radius" value="50"/>
            <property tag="name" value="Peripeduncular nucleus"/>
            <property tag="area" value="Thalamus"/>
            <property tag="region" value="PP"/>
            <instance id="0">
                <location x="-2282.390348528912455" y="-3248.363304301795324" z="-3393.563932211283827"/>
            </instance>
        </population>
        <population id="CONTRA_PP" component="L23_E_comp" size="1" type="populationList">
            <property tag="radius" value="50"/>
            <property tag="name" value="Peripeduncular nucleus"/>
            <property tag="area" value="Thalamus"/>
            <property tag="region" value="CONTRA_PP"/>
            <instance id="0">
                <location x="2282.469529590376624" y="-3248.308967656849291" z="-3394.062935213191849"/>
            </instance>
        </population>
        <population id="IAD" component="L23_E_comp" size="1" type="populationList">
            <property tag="radius" value="50"/>
            <property tag="name" value="Interanterodorsal nucleus of the thalamus"/>
            <property tag="area" value="Thalamus"/>
            <property tag="region" value="IAD"/>
            <instance id="0">
                <location x="-591.769209908639027" y="-793.336283195159353" z="-3118.143438595312546"/>
            </instance>
        </population>
        <population id="CONTRA_IAD" component="L23_E_comp" size="1" type="populationList">
            <property tag="radius" value="50"/>
            <property tag="name" value="Interanterodorsal nucleus of the thalamus"/>
            <property tag="area" value="Thalamus"/>
            <property tag="region" value="CONTRA_IAD"/>
            <instance id="0">
                <location x="592.64025886201955" y="-792.868779464593786" z="-3118.077807047321585"/>
            </instance>
        </population>
        <population id="AV" component="L23_E_comp" size="1" type="populationList">
            <property tag="radius" value="50"/>
            <property tag="name" value="Anteroventral nucleus of thalamus"/>
            <property tag="area" value="Thalamus"/>
            <property tag="region" value="AV"/>
            <instance id="0">
                <location x="-1150.502036726533333" y="-755.719000614266974" z="-2763.015394630838728"/>
            </instance>
        </population>
        <population id="CONTRA_AV" component="L23_E_comp" size="1" type="populationList">
            <property tag="radius" value="50"/>
            <property tag="name" value="Anteroventral nucleus of thalamus"/>
            <property tag="area" value="Thalamus"/>
            <property tag="region" value="CONTRA_AV"/>
            <instance id="0">
                <location x="1151.916588595942358" y="-755.620851742233413" z="-2762.734385545288205"/>
            </instance>
        </population>
        <population id="VPM" component="L23_E_comp" size="1" type="populationList">
            <property tag="radius" value="50"/>
            <property tag="name" value="Ventral posteromedial nucleus of the thalamus"/>
            <property tag="area" value="Thalamus"/>
            <property tag="region" value="VPM"/>
            <instance id="0">
                <location x="-1787.063456566190325" y="-1819.151257489420232" z="-3097.550382857782552"/>
            </instance>
        </population>
        <population id="CONTRA_VPM" component="L23_E_comp" size="1" type="populationList">
            <property tag="radius" value="50"/>
            <property tag="name" value="Ventral posteromedial nucleus of the thalamus"/>
            <property tag="area" value="Thalamus"/>
            <property tag="region" value="CONTRA_VPM"/>
            <instance id="0">
                <location x="1787.22652456009564" y="-1819.186532489852652" z="-3097.178815654427581"/>
            </instance>
        </population>
        <population id="LGd" component="L23_E_comp" size="1" type="populationList">
            <property tag="radius" value="50"/>
            <property tag="name" value="Dorsal part of the lateral geniculate complex"/>
            <property tag="area" value="Thalamus"/>
            <property tag="region" value="LGd"/>
            <instance id="0">
                <location x="-2314.58278965545378" y="-2412.039374115368901" z="-2282.369986542258175"/>
            </instance>
        </population>
        <population id="CONTRA_LGd" component="L23_E_comp" size="1" type="populationList">
            <property tag="radius" value="50"/>
            <property tag="name" value="Dorsal part of the lateral geniculate complex"/>
            <property tag="area" value="Thalamus"/>
            <property tag="region" value="CONTRA_LGd"/>
            <instance id="0">
                <location x="2315.194295091541335" y="-2412.482656901898281" z="-2281.596682681303719"/>
            </instance>
        </population>
        <population id="MH" component="L23_E_comp" size="1" type="populationList">
            <property tag="radius" value="50"/>
            <property tag="name" value="Medial habenula"/>
            <property tag="area" value="Thalamus"/>
            <property tag="region" value="MH"/>
            <instance id="0">
                <location x="-276.364981361660284" y="-1559.156663448250356" z="-2041.183704951183245"/>
            </instance>
        </population>
        <population id="CONTRA_MH" component="L23_E_comp" size="1" type="populationList">
            <property tag="radius" value="50"/>
            <property tag="name" value="Medial habenula"/>
            <property tag="area" value="Thalamus"/>
            <property tag="region" value="CONTRA_MH"/>
            <instance id="0">
                <location x="277.441354041467719" y="-1560.07400694637181" z="-2041.048149020808069"/>
            </instance>
        </population>
        <population id="SPFp" component="L23_E_comp" size="1" type="populationList">
            <property tag="radius" value="50"/>
            <property tag="name" value="Subparafascicular nucleus, parvicellular part"/>
            <property tag="area" value="Thalamus"/>
            <property tag="region" value="SPFp"/>
            <instance id="0">
                <location x="-1671.264683854484474" y="-2840.16958498302165" z="-3395.866312768789157"/>
            </instance>
        </population>
        <population id="CONTRA_SPFp" component="L23_E_comp" size="1" type="populationList">
            <property tag="radius" value="50"/>
            <property tag="name" value="Subparafascicular nucleus, parvicellular part"/>
            <property tag="area" value="Thalamus"/>
            <property tag="region" value="CONTRA_SPFp"/>
            <instance id="0">
                <location x="1673.025915015302417" y="-2840.192376618210801" z="-3395.186993989349048"/>
            </instance>
        </population>
        <population id="SubG" component="L23_E_comp" size="1" type="populationList">
            <property tag="radius" value="50"/>
            <property tag="name" value="Subgeniculate nucleus"/>
            <property tag="area" value="Thalamus"/>
            <property tag="region" value="SubG"/>
            <instance id="0">
                <location x="-2534.498821213428528" y="-2528.541782244863953" z="-3547.746024230036255"/>
            </instance>
        </population>
        <population id="CONTRA_SubG" component="L23_E_comp" size="1" type="populationList">
            <property tag="radius" value="50"/>
            <property tag="name" value="Subgeniculate nucleus"/>
            <property tag="area" value="Thalamus"/>
            <property tag="region" value="CONTRA_SubG"/>
            <instance id="0">
                <location x="2534.881591812451006" y="-2528.111502716485575" z="-3547.619681623868019"/>
            </instance>
        </population>
        <population id="MGd" component="L23_E_comp" size="1" type="populationList">
            <property tag="radius" value="50"/>
            <property tag="name" value="Medial geniculate complex, dorsal part"/>
            <property tag="area" value="Thalamus"/>
            <property tag="region" value="MGd"/>
            <instance id="0">
                <location x="-2180.618999999577227" y="-3126.440140666891239" z="-2510.504672823642068"/>
            </instance>
        </population>
        <population id="CONTRA_MGd" component="L23_E_comp" size="1" type="populationList">
            <property tag="radius" value="50"/>
            <property tag="name" value="Medial geniculate complex, dorsal part"/>
            <property tag="area" value="Thalamus"/>
            <property tag="region" value="CONTRA_MGd"/>
            <instance id="0">
                <location x="2182.283457887755503" y="-3126.471384394520555" z="-2510.540953232707579"/>
            </instance>
        </population>
        <population id="AMd" component="L23_E_comp" size="1" type="populationList">
            <property tag="radius" value="50"/>
            <property tag="name" value="Anteromedial nucleus, dorsal part"/>
            <property tag="area" value="Thalamus"/>
            <property tag="region" value="AMd"/>
            <instance id="0">
                <location x="-802.02618967141234" y="-842.67816339528747" z="-3316.298383617993295"/>
            </instance>
        </population>
        <population id="CONTRA_AMd" component="L23_E_comp" size="1" type="populationList">
            <property tag="radius" value="50"/>
            <property tag="name" value="Anteromedial nucleus, dorsal part"/>
            <property tag="area" value="Thalamus"/>
            <property tag="region" value="CONTRA_AMd"/>
            <instance id="0">
                <location x="803.026552692414953" y="-842.537782517330584" z="-3316.302792885288909"/>
            </instance>
        </population>
        <population id="CL" component="L23_E_comp" size="1" type="populationList">
            <property tag="radius" value="50"/>
            <property tag="name" value="Central lateral nucleus of the thalamus"/>
            <property tag="area" value="Thalamus"/>
            <property tag="region" value="CL"/>
            <instance id="0">
                <location x="-1024.904298107442173" y="-1664.848207192182372" z="-2500.285574456513586"/>
            </instance>
        </population>
        <population id="CONTRA_CL" component="L23_E_comp" size="1" type="populationList">
            <property tag="radius" value="50"/>
            <property tag="name" value="Central lateral nucleus of the thalamus"/>
            <property tag="area" value="Thalamus"/>
            <property tag="region" value="CONTRA_CL"/>
            <instance id="0">
                <location x="1026.251831250901887" y="-1665.021236731060526" z="-2500.129732578348467"/>
            </instance>
        </population>
        <population id="VPL" component="L23_E_comp" size="1" type="populationList">
            <property tag="radius" value="50"/>
            <property tag="name" value="Ventral posterolateral nucleus of the thalamus"/>
            <property tag="area" value="Thalamus"/>
            <property tag="region" value="VPL"/>
            <instance id="0">
                <location x="-2028.813683495895702" y="-1658.099435465051556" z="-3205.146546477768879"/>
            </instance>
        </population>
        <population id="CONTRA_VPL" component="L23_E_comp" size="1" type="populationList">
            <property tag="radius" value="50"/>
            <property tag="name" value="Ventral posterolateral nucleus of the thalamus"/>
            <property tag="area" value="Thalamus"/>
            <property tag="region" value="CONTRA_VPL"/>
            <instance id="0">
                <location x="2029.316202005883952" y="-1657.894103794984403" z="-3205.687156694263194"/>
            </instance>
        </population>
        <population id="PT" component="L23_E_comp" size="1" type="populationList">
            <property tag="radius" value="50"/>
            <property tag="name" value="Parataenial nucleus"/>
            <property tag="area" value="Thalamus"/>
            <property tag="region" value="PT"/>
            <instance id="0">
                <location x="-428.732390051643051" y="-486.688912029465484" z="-3380.67828393525906"/>
            </instance>
        </population>
        <population id="CONTRA_PT" component="L23_E_comp" size="1" type="populationList">
            <property tag="radius" value="50"/>
            <property tag="name" value="Parataenial nucleus"/>
            <property tag="area" value="Thalamus"/>
            <property tag="region" value="CONTRA_PT"/>
            <instance id="0">
                <location x="429.680798943163779" y="-487.082720530404004" z="-3381.327638029861191"/>
            </instance>
        </population>
        <population id="SGN" component="L23_E_comp" size="1" type="populationList">
            <property tag="radius" value="50"/>
            <property tag="name" value="Suprageniculate nucleus"/>
            <property tag="area" value="Thalamus"/>
            <property tag="region" value="SGN"/>
            <instance id="0">
                <location x="-2019.827303371036805" y="-3186.731260325596395" z="-2601.370072055161017"/>
            </instance>
        </population>
        <population id="CONTRA_SGN" component="L23_E_comp" size="1" type="populationList">
            <property tag="radius" value="50"/>
            <property tag="name" value="Suprageniculate nucleus"/>
            <property tag="area" value="Thalamus"/>
            <property tag="region" value="CONTRA_SGN"/>
            <instance id="0">
                <location x="2020.260541016316665" y="-3186.272280779056018" z="-2601.568537760158051"/>
            </instance>
        </population>
        <population id="VAL" component="L23_E_comp" size="1" type="populationList">
            <property tag="radius" value="50"/>
            <property tag="name" value="Ventral anterior-lateral complex of the thalamus"/>
            <property tag="area" value="Thalamus"/>
            <property tag="region" value="VAL"/>
            <instance id="0">
                <location x="-1261.910415758060253" y="-1354.134203521228073" z="-3383.782635623743317"/>
            </instance>
        </population>
        <population id="CONTRA_VAL" component="L23_E_comp" size="1" type="populationList">
            <property tag="radius" value="50"/>
            <property tag="name" value="Ventral anterior-lateral complex of the thalamus"/>
            <property tag="area" value="Thalamus"/>
            <property tag="region" value="CONTRA_VAL"/>
            <instance id="0">
                <location x="1263.788292474911032" y="-1354.76736320646296" z="-3383.842192759512272"/>
            </instance>
        </population>
        <population id="MGm" component="L23_E_comp" size="1" type="populationList">
            <property tag="radius" value="50"/>
            <property tag="name" value="Medial geniculate complex, medial part"/>
            <property tag="area" value="Thalamus"/>
            <property tag="region" value="MGm"/>
            <instance id="0">
                <location x="-2029.559381440968764" y="-3071.751961140769708" z="-3035.421376785456687"/>
            </instance>
        </population>
        <population id="CONTRA_MGm" component="L23_E_comp" size="1" type="populationList">
            <property tag="radius" value="50"/>
            <property tag="name" value="Medial geniculate complex, medial part"/>
            <property tag="area" value="Thalamus"/>
            <property tag="region" value="CONTRA_MGm"/>
            <instance id="0">
                <location x="2030.029027722594492" y="-3071.473405487250147" z="-3034.735920216274735"/>
            </instance>
        </population>
        <population id="PF" component="L23_E_comp" size="1" type="populationList">
            <property tag="radius" value="50"/>
            <property tag="name" value="Parafascicular nucleus"/>
            <property tag="area" value="Thalamus"/>
            <property tag="region" value="PF"/>
            <instance id="0">
                <location x="-717.517368063469462" y="-2213.538138938041357" z="-2931.209134260050178"/>
            </instance>
        </population>
        <population id="CONTRA_PF" component="L23_E_comp" size="1" type="populationList">
            <property tag="radius" value="50"/>
            <property tag="name" value="Parafascicular nucleus"/>
            <property tag="area" value="Thalamus"/>
            <property tag="region" value="CONTRA_PF"/>
            <instance id="0">
                <location x="718.876572031230012" y="-2213.841636311412913" z="-2930.86797329590263"/>
            </instance>
        </population>
        <population id="CM" component="L23_E_comp" size="1" type="populationList">
            <property tag="radius" value="50"/>
            <property tag="name" value="Central medial nucleus of the thalamus"/>
            <property tag="area" value="Thalamus"/>
            <property tag="region" value="CM"/>
            <instance id="0">
                <location x="-237.819045030527093" y="-1400.897933023034739" z="-3446.182573111900638"/>
            </instance>
        </population>
        <population id="CONTRA_CM" component="L23_E_comp" size="1" type="populationList">
            <property tag="radius" value="50"/>
            <property tag="name" value="Central medial nucleus of the thalamus"/>
            <property tag="area" value="Thalamus"/>
            <property tag="region" value="CONTRA_CM"/>
            <instance id="0">
                <location x="238.806586343288927" y="-1400.948104085759041" z="-3445.984762865506582"/>
            </instance>
        </population>
        <population id="SMT" component="L23_E_comp" size="1" type="populationList">
            <property tag="radius" value="50"/>
            <property tag="name" value="Submedial nucleus of the thalamus"/>
            <property tag="area" value="Thalamus"/>
            <property tag="region" value="SMT"/>
            <instance id="0">
                <location x="-535.579383490176724" y="-1361.609593084746621" z="-3877.564095678406375"/>
            </instance>
        </population>
        <population id="CONTRA_SMT" component="L23_E_comp" size="1" type="populationList">
            <property tag="radius" value="50"/>
            <property tag="name" value="Submedial nucleus of the thalamus"/>
            <property tag="area" value="Thalamus"/>
            <property tag="region" value="CONTRA_SMT"/>
            <instance id="0">
                <location x="536.48364155509455" y="-1361.534117766816735" z="-3876.972507471770768"/>
            </instance>
        </population>
        <population id="MGv" component="L23_E_comp" size="1" type="populationList">
            <property tag="radius" value="50"/>
            <property tag="name" value="Medial geniculate complex, ventral part"/>
            <property tag="area" value="Thalamus"/>
            <property tag="region" value="MGv"/>
            <instance id="0">
                <location x="-2342.762054052747317" y="-3189.546920249782488" z="-2865.62551071307098"/>
            </instance>
        </population>
        <population id="CONTRA_MGv" component="L23_E_comp" size="1" type="populationList">
            <property tag="radius" value="50"/>
            <property tag="name" value="Medial geniculate complex, ventral part"/>
            <property tag="area" value="Thalamus"/>
            <property tag="region" value="CONTRA_MGv"/>
            <instance id="0">
                <location x="2343.606099283600088" y="-3188.941972836672903" z="-2865.312515801425434"/>
            </instance>
        </population>
        <population id="SPA" component="L23_E_comp" size="1" type="populationList">
            <property tag="radius" value="50"/>
            <property tag="name" value="Subparafascicular area"/>
            <property tag="area" value="Thalamus"/>
            <property tag="region" value="SPA"/>
            <instance id="0">
                <location x="-165.019922077466475" y="-2246.762122320475555" z="-3314.787673366998206"/>
            </instance>
        </population>
        <population id="CONTRA_SPA" component="L23_E_comp" size="1" type="populationList">
            <property tag="radius" value="50"/>
            <property tag="name" value="Subparafascicular area"/>
            <property tag="area" value="Thalamus"/>
            <property tag="region" value="CONTRA_SPA"/>
            <instance id="0">
                <location x="166.210603230879713" y="-2246.173671393867153" z="-3314.797588056272616"/>
            </instance>
        </population>
        <population id="LH" component="L23_E_comp" size="1" type="populationList">
            <property tag="radius" value="50"/>
            <property tag="name" value="Lateral habenula"/>
            <property tag="area" value="Thalamus"/>
            <property tag="region" value="LH"/>
            <instance id="0">
                <location x="-558.344699085523985" y="-1785.429550974145286" z="-2217.443911564138034"/>
            </instance>
        </population>
        <population id="CONTRA_LH" component="L23_E_comp" size="1" type="populationList">
            <property tag="radius" value="50"/>
            <property tag="name" value="Lateral habenula"/>
            <property tag="area" value="Thalamus"/>
            <property tag="region" value="CONTRA_LH"/>
            <instance id="0">
                <location x="560.12756067557234" y="-1785.27326434190968" z="-2217.39712998406776"/>
            </instance>
        </population>
        <population id="RE" component="L23_E_comp" size="1" type="populationList">
            <property tag="radius" value="50"/>
            <property tag="name" value="Nucleus of reunions"/>
            <property tag="area" value="Thalamus"/>
            <property tag="region" value="RE"/>
            <instance id="0">
                <location x="-274.277169007270118" y="-1032.604689752164404" z="-4132.689144998864322"/>
            </instance>
        </population>
        <population id="CONTRA_RE" component="L23_E_comp" size="1" type="populationList">
            <property tag="radius" value="50"/>
            <property tag="name" value="Nucleus of reunions"/>
            <property tag="area" value="Thalamus"/>
            <property tag="region" value="CONTRA_RE"/>
            <instance id="0">
                <location x="275.537973659332124" y="-1033.197091016872264" z="-4133.27573808195757"/>
            </instance>
        </population>
        <population id="VM" component="L23_E_comp" size="1" type="populationList">
            <property tag="radius" value="50"/>
            <property tag="name" value="Ventral medial nucleus of the thalamus"/>
            <property tag="area" value="Thalamus"/>
            <property tag="region" value="VM"/>
            <instance id="0">
                <location x="-902.156211524828791" y="-1579.714372892427036" z="-3966.597431574583425"/>
            </instance>
        </population>
        <population id="CONTRA_VM" component="L23_E_comp" size="1" type="populationList">
            <property tag="radius" value="50"/>
            <property tag="name" value="Ventral medial nucleus of the thalamus"/>
            <property tag="area" value="Thalamus"/>
            <property tag="region" value="CONTRA_VM"/>
            <instance id="0">
                <location x="902.680208459881442" y="-1580.196848801203487" z="-3966.660288280281748"/>
            </instance>
        </population>
        <population id="PO" component="L23_E_comp" size="1" type="populationList">
            <property tag="radius" value="50"/>
            <property tag="name" value="Posterior complex of the thalamus"/>
            <property tag="area" value="Thalamus"/>
            <property tag="region" value="PO"/>
            <instance id="0">
                <location x="-1483.781476939971071" y="-2069.001582835230693" z="-2721.621676382541409"/>
            </instance>
        </population>
        <population id="CONTRA_PO" component="L23_E_comp" size="1" type="populationList">
            <property tag="radius" value="50"/>
            <property tag="name" value="Posterior complex of the thalamus"/>
            <property tag="area" value="Thalamus"/>
            <property tag="region" value="CONTRA_PO"/>
            <instance id="0">
                <location x="1485.375143952957842" y="-2069.14853726114552" z="-2720.897288296185707"/>
            </instance>
        </population>
        <population id="AMv" component="L23_E_comp" size="1" type="populationList">
            <property tag="radius" value="50"/>
            <property tag="name" value="Anteromedial nucleus, ventral part"/>
            <property tag="area" value="Thalamus"/>
            <property tag="region" value="AMv"/>
            <instance id="0">
                <location x="-827.964645299547669" y="-812.141670134355763" z="-3642.275757537768641"/>
            </instance>
        </population>
        <population id="CONTRA_AMv" component="L23_E_comp" size="1" type="populationList">
            <property tag="radius" value="50"/>
            <property tag="name" value="Anteromedial nucleus, ventral part"/>
            <property tag="area" value="Thalamus"/>
            <property tag="region" value="CONTRA_AMv"/>
            <instance id="0">
                <location x="828.524956726358255" y="-812.020676931137359" z="-3641.666287540277608"/>
            </instance>
        </population>
        <population id="PR" component="L23_E_comp" size="1" type="populationList">
            <property tag="radius" value="50"/>
            <property tag="name" value="Perireunensis nucleus"/>
            <property tag="area" value="Thalamus"/>
            <property tag="region" value="PR"/>
            <instance id="0">
                <location x="-546.51218743015238" y="-1310.657810522470299" z="-4188.609569247421859"/>
            </instance>
        </population>
        <population id="CONTRA_PR" component="L23_E_comp" size="1" type="populationList">
            <property tag="radius" value="50"/>
            <property tag="name" value="Perireunensis nucleus"/>
            <property tag="area" value="Thalamus"/>
            <property tag="region" value="CONTRA_PR"/>
            <instance id="0">
                <location x="547.273035689907488" y="-1310.688796950531469" z="-4188.487037481802872"/>
            </instance>
        </population>
        <population id="VPLpc" component="L23_E_comp" size="1" type="populationList">
            <property tag="radius" value="50"/>
            <property tag="name" value="Ventral posterolateral nucleus of the thalamus, parvicellular part"/>
            <property tag="area" value="Thalamus"/>
            <property tag="region" value="VPLpc"/>
            <instance id="0">
                <location x="-1457.422691764105139" y="-2106.705908388549233" z="-3675.25861636817217"/>
            </instance>
        </population>
        <population id="CONTRA_VPLpc" component="L23_E_comp" size="1" type="populationList">
            <property tag="radius" value="50"/>
            <property tag="name" value="Ventral posterolateral nucleus of the thalamus, parvicellular part"/>
            <property tag="area" value="Thalamus"/>
            <property tag="region" value="CONTRA_VPLpc"/>
            <instance id="0">
                <location x="1458.086177201533701" y="-2106.556462203033334" z="-3675.528445861484215"/>
            </instance>
        </population>
        <population id="SPFm" component="L23_E_comp" size="1" type="populationList">
            <property tag="radius" value="50"/>
            <property tag="name" value="Subparafascicular nucleus, magnocellular part"/>
            <property tag="area" value="Thalamus"/>
            <property tag="region" value="SPFm"/>
            <instance id="0">
                <location x="-403.762738028458557" y="-2095.979714250534926" z="-3938.011557351824194"/>
            </instance>
        </population>
        <population id="CONTRA_SPFm" component="L23_E_comp" size="1" type="populationList">
            <property tag="radius" value="50"/>
            <property tag="name" value="Subparafascicular nucleus, magnocellular part"/>
            <property tag="area" value="Thalamus"/>
            <property tag="region" value="CONTRA_SPFm"/>
            <instance id="0">
                <location x="404.667794019441544" y="-2096.338630879632547" z="-3937.878203994237538"/>
            </instance>
        </population>
        <population id="RT" component="L23_E_comp" size="1" type="populationList">
            <property tag="radius" value="50"/>
            <property tag="name" value="Reticular nucleus of the thalamus"/>
            <property tag="area" value="Thalamus"/>
            <property tag="region" value="RT"/>
            <instance id="0">
                <location x="-1990.846712975439914" y="-1213.260688594660678" z="-3205.485261783371243"/>
            </instance>
        </population>
        <population id="CONTRA_RT" component="L23_E_comp" size="1" type="populationList">
            <property tag="radius" value="50"/>
            <property tag="name" value="Reticular nucleus of the thalamus"/>
            <property tag="area" value="Thalamus"/>
            <property tag="region" value="CONTRA_RT"/>
            <instance id="0">
                <location x="1991.499923177656001" y="-1212.420537489877916" z="-3205.637041689393754"/>
            </instance>
        </population>
        <population id="LGv" component="L23_E_comp" size="1" type="populationList">
            <property tag="radius" value="50"/>
            <property tag="name" value="Ventral part of the lateral geniculate complex"/>
            <property tag="area" value="Thalamus"/>
            <property tag="region" value="LGv"/>
            <instance id="0">
                <location x="-2628.771242012644052" y="-2459.07990478478041" z="-2968.655670061642013"/>
            </instance>
        </population>
        <population id="CONTRA_LGv" component="L23_E_comp" size="1" type="populationList">
            <property tag="radius" value="50"/>
            <property tag="name" value="Ventral part of the lateral geniculate complex"/>
            <property tag="area" value="Thalamus"/>
            <property tag="region" value="CONTRA_LGv"/>
            <instance id="0">
                <location x="2630.097506705878459" y="-2458.432554180916668" z="-2969.047945246188192"/>
            </instance>
        </population>
        <population id="IGL" component="L23_E_comp" size="1" type="populationList">
            <property tag="radius" value="50"/>
            <property tag="name" value="Intergeniculate leaflet of the lateral geniculate complex"/>
            <property tag="area" value="Thalamus"/>
            <property tag="region" value="IGL"/>
            <instance id="0">
                <location x="-2568.803223153252929" y="-2522.661242360466986" z="-2682.093209624993051"/>
            </instance>
        </population>
        <population id="CONTRA_IGL" component="L23_E_comp" size="1" type="populationList">
            <property tag="radius" value="50"/>
            <property tag="name" value="Intergeniculate leaflet of the lateral geniculate complex"/>
            <property tag="area" value="Thalamus"/>
            <property tag="region" value="CONTRA_IGL"/>
            <instance id="0">
                <location x="2569.531823142687699" y="-2522.873323007112958" z="-2682.03261004132446"/>
            </instance>
        </population>
        <population id="AD" component="L23_E_comp" size="1" type="populationList">
            <property tag="radius" value="50"/>
            <property tag="name" value="Anterodorsal nucleus"/>
            <property tag="area" value="Thalamus"/>
            <property tag="region" value="AD"/>
            <instance id="0">
                <location x="-910.678880649111306" y="-748.611000391925586" z="-2466.324201397659181"/>
            </instance>
        </population>
        <population id="CONTRA_AD" component="L23_E_comp" size="1" type="populationList">
            <property tag="radius" value="50"/>
            <property tag="name" value="Anterodorsal nucleus"/>
            <property tag="area" value="Thalamus"/>
            <property tag="region" value="CONTRA_AD"/>
            <instance id="0">
                <location x="911.772787859649384" y="-748.342831837287918" z="-2466.043460137945203"/>
            </instance>
        </population>
        <population id="POL" component="L23_E_comp" size="1" type="populationList">
            <property tag="radius" value="50"/>
            <property tag="name" value="Posterior limiting nucleus of the thalamus"/>
            <property tag="area" value="Thalamus"/>
            <property tag="region" value="POL"/>
            <instance id="0">
                <location x="-1794.297108152175269" y="-3031.447609182208453" z="-2821.30096721805603"/>
            </instance>
        </population>
        <population id="CONTRA_POL" component="L23_E_comp" size="1" type="populationList">
            <property tag="radius" value="50"/>
            <property tag="name" value="Posterior limiting nucleus of the thalamus"/>
            <property tag="area" value="Thalamus"/>
            <property tag="region" value="CONTRA_POL"/>
            <instance id="0">
                <location x="1795.14962573941807" y="-3031.66740583758974" z="-2820.447374299440071"/>
            </instance>
        </population>
        <population id="LD" component="L23_E_comp" size="1" type="populationList">
            <property tag="radius" value="50"/>
            <property tag="name" value="Lateral dorsal nucleus of thalamus"/>
            <property tag="area" value="Thalamus"/>
            <property tag="region" value="LD"/>
            <instance id="0">
                <location x="-1567.423701032322015" y="-1414.005265723577168" z="-2128.955866020017766"/>
            </instance>
        </population>
        <population id="CONTRA_LD" component="L23_E_comp" size="1" type="populationList">
            <property tag="radius" value="50"/>
            <property tag="name" value="Lateral dorsal nucleus of thalamus"/>
            <property tag="area" value="Thalamus"/>
            <property tag="region" value="CONTRA_LD"/>
            <instance id="0">
                <location x="1568.913168225241179" y="-1414.237310086942216" z="-2129.431242211793688"/>
            </instance>
        </population>
        <population id="PCN" component="L23_E_comp" size="1" type="populationList">
            <property tag="radius" value="50"/>
            <property tag="name" value="Paracentral nucleus"/>
            <property tag="area" value="Thalamus"/>
            <property tag="region" value="PCN"/>
            <instance id="0">
                <location x="-862.393478558305901" y="-1519.056214098320424" z="-3180.040161492913739"/>
            </instance>
        </population>
        <population id="CONTRA_PCN" component="L23_E_comp" size="1" type="populationList">
            <property tag="radius" value="50"/>
            <property tag="name" value="Paracentral nucleus"/>
            <property tag="area" value="Thalamus"/>
            <property tag="region" value="CONTRA_PCN"/>
            <instance id="0">
                <location x="863.160555850283572" y="-1518.906292192159526" z="-3180.125723922592897"/>
            </instance>
        </population>
        <population id="VPMpc" component="L23_E_comp" size="1" type="populationList">
            <property tag="radius" value="50"/>
            <property tag="name" value="Ventral posteromedial nucleus of the thalamus, parvicellular part"/>
            <property tag="area" value="Thalamus"/>
            <property tag="region" value="VPMpc"/>
            <instance id="0">
                <location x="-874.488677032985038" y="-2111.593907609927555" z="-3622.074423707801998"/>
            </instance>
        </population>
        <population id="CONTRA_VPMpc" component="L23_E_comp" size="1" type="populationList">
            <property tag="radius" value="50"/>
            <property tag="name" value="Ventral posteromedial nucleus of the thalamus, parvicellular part"/>
            <property tag="area" value="Thalamus"/>
            <property tag="region" value="CONTRA_VPMpc"/>
            <instance id="0">
                <location x="875.675804732449024" y="-2111.915958040165151" z="-3622.321202201836059"/>
            </instance>
        </population>
        <population id="PVT" component="L23_E_comp" size="1" type="populationList">
            <property tag="radius" value="50"/>
            <property tag="name" value="Paraventricular nucleus of the thalamus"/>
            <property tag="area" value="Thalamus"/>
            <property tag="region" value="PVT"/>
            <instance id="0">
                <location x="-185.018948628076743" y="-1045.099405249304027" z="-2822.783380064203357"/>
            </instance>
        </population>
        <population id="CONTRA_PVT" component="L23_E_comp" size="1" type="populationList">
            <property tag="radius" value="50"/>
            <property tag="name" value="Paraventricular nucleus of the thalamus"/>
            <property tag="area" value="Thalamus"/>
            <property tag="region" value="CONTRA_PVT"/>
            <instance id="0">
                <location x="186.131665619305352" y="-1045.458882596492458" z="-2823.1911143543648"/>
            </instance>
        </population>
        <population id="RH" component="L23_E_comp" size="1" type="populationList">
            <property tag="radius" value="50"/>
            <property tag="name" value="Rhomboid nucleus"/>
            <property tag="area" value="Thalamus"/>
            <property tag="region" value="RH"/>
            <instance id="0">
                <location x="-231.793581769152155" y="-1285.346173096913844" z="-3718.7898748985981"/>
            </instance>
        </population>
        <population id="CONTRA_RH" component="L23_E_comp" size="1" type="populationList">
            <property tag="radius" value="50"/>
            <property tag="name" value="Rhomboid nucleus"/>
            <property tag="area" value="Thalamus"/>
            <property tag="region" value="CONTRA_RH"/>
            <instance id="0">
                <location x="232.656729316672056" y="-1285.327454896121253" z="-3719.232434230885701"/>
            </instance>
        </population>
        <projection id="proj_AD_RE" presynapticPopulation="AD" postsynapticPopulation="RE" synapse="ampa">
            <connectionWD id="0" preCellId="../AD/0/L23_E_comp" postCellId="../RE/0/L23_E_comp" weight="0.0038747973" delay="0ms"/>
        </projection>
        <projection id="proj_AD_RT" presynapticPopulation="AD" postsynapticPopulation="RT" synapse="ampa">
            <connectionWD id="0" preCellId="../AD/0/L23_E_comp" postCellId="../RT/0/L23_E_comp" weight="0.116382692" delay="0ms"/>
        </projection>
        <projection id="proj_AMd_AV" presynapticPopulation="AMd" postsynapticPopulation="AV" synapse="ampa">
            <connectionWD id="0" preCellId="../AMd/0/L23_E_comp" postCellId="../AV/0/L23_E_comp" weight="0.0216143162" delay="0ms"/>
        </projection>
        <projection id="proj_AMd_PVT" presynapticPopulation="AMd" postsynapticPopulation="PVT" synapse="ampa">
            <connectionWD id="0" preCellId="../AMd/0/L23_E_comp" postCellId="../PVT/0/L23_E_comp" weight="0.001939719" delay="0ms"/>
        </projection>
        <projection id="proj_AMd_RT" presynapticPopulation="AMd" postsynapticPopulation="RT" synapse="ampa">
            <connectionWD id="0" preCellId="../AMd/0/L23_E_comp" postCellId="../RT/0/L23_E_comp" weight="0.0265879435" delay="0ms"/>
        </projection>
        <projection id="proj_AV_AD" presynapticPopulation="AV" postsynapticPopulation="AD" synapse="ampa">
            <connectionWD id="0" preCellId="../AV/0/L23_E_comp" postCellId="../AD/0/L23_E_comp" weight="0.0035208185" delay="0ms"/>
        </projection>
        <projection id="proj_AV_AMv" presynapticPopulation="AV" postsynapticPopulation="AMv" synapse="ampa">
            <connectionWD id="0" preCellId="../AV/0/L23_E_comp" postCellId="../AMv/0/L23_E_comp" weight="0.0016308592" delay="0ms"/>
        </projection>
        <projection id="proj_AV_LD" presynapticPopulation="AV" postsynapticPopulation="LD" synapse="ampa">
            <connectionWD id="0" preCellId="../AV/0/L23_E_comp" postCellId="../LD/0/L23_E_comp" weight="0.0753977529" delay="0ms"/>
        </projection>
        <projection id="proj_AV_LGd" presynapticPopulation="AV" postsynapticPopulation="LGd" synapse="ampa">
            <connectionWD id="0" preCellId="../AV/0/L23_E_comp" postCellId="../LGd/0/L23_E_comp" weight="0.0004913802" delay="0ms"/>
        </projection>
        <projection id="proj_AV_LGv" presynapticPopulation="AV" postsynapticPopulation="LGv" synapse="ampa">
            <connectionWD id="0" preCellId="../AV/0/L23_E_comp" postCellId="../LGv/0/L23_E_comp" weight="0.0021081292" delay="0ms"/>
        </projection>
        <projection id="proj_AV_LP" presynapticPopulation="AV" postsynapticPopulation="LP" synapse="ampa">
            <connectionWD id="0" preCellId="../AV/0/L23_E_comp" postCellId="../LP/0/L23_E_comp" weight="0.047250388" delay="0ms"/>
        </projection>
        <projection id="proj_AV_POL" presynapticPopulation="AV" postsynapticPopulation="POL" synapse="ampa">
            <connectionWD id="0" preCellId="../AV/0/L23_E_comp" postCellId="../POL/0/L23_E_comp" weight="0.0002063828" delay="0ms"/>
        </projection>
        <projection id="proj_AV_PP" presynapticPopulation="AV" postsynapticPopulation="PP" synapse="ampa">
            <connectionWD id="0" preCellId="../AV/0/L23_E_comp" postCellId="../PP/0/L23_E_comp" weight="0.000068244692114" delay="0ms"/>
        </projection>
        <projection id="proj_AV_RT" presynapticPopulation="AV" postsynapticPopulation="RT" synapse="ampa">
            <connectionWD id="0" preCellId="../AV/0/L23_E_comp" postCellId="../RT/0/L23_E_comp" weight="0.0425232323" delay="0ms"/>
        </projection>
        <projection id="proj_CL_AMd" presynapticPopulation="CL" postsynapticPopulation="AMd" synapse="ampa">
            <connectionWD id="0" preCellId="../CL/0/L23_E_comp" postCellId="../AMd/0/L23_E_comp" weight="0.0580518533" delay="0ms"/>
        </projection>
        <projection id="proj_CL_AMv" presynapticPopulation="CL" postsynapticPopulation="AMv" synapse="ampa">
            <connectionWD id="0" preCellId="../CL/0/L23_E_comp" postCellId="../AMv/0/L23_E_comp" weight="0.0145517451" delay="0ms"/>
        </projection>
        <projection id="proj_CL_AV" presynapticPopulation="CL" postsynapticPopulation="AV" synapse="ampa">
            <connectionWD id="0" preCellId="../CL/0/L23_E_comp" postCellId="../AV/0/L23_E_comp" weight="0.0306541079" delay="0ms"/>
        </projection>
        <projection id="proj_CL_CM" presynapticPopulation="CL" postsynapticPopulation="CM" synapse="ampa">
            <connectionWD id="0" preCellId="../CL/0/L23_E_comp" postCellId="../CM/0/L23_E_comp" weight="0.0049299972" delay="0ms"/>
        </projection>
        <projection id="proj_CL_IMD" presynapticPopulation="CL" postsynapticPopulation="IMD" synapse="ampa">
            <connectionWD id="0" preCellId="../CL/0/L23_E_comp" postCellId="../IMD/0/L23_E_comp" weight="0.0057035681" delay="0ms"/>
        </projection>
        <projection id="proj_CL_MH" presynapticPopulation="CL" postsynapticPopulation="MH" synapse="ampa">
            <connectionWD id="0" preCellId="../CL/0/L23_E_comp" postCellId="../MH/0/L23_E_comp" weight="0.0003991678" delay="0ms"/>
        </projection>
        <projection id="proj_CL_PF" presynapticPopulation="CL" postsynapticPopulation="PF" synapse="ampa">
            <connectionWD id="0" preCellId="../CL/0/L23_E_comp" postCellId="../PF/0/L23_E_comp" weight="0.0121729853" delay="0ms"/>
        </projection>
        <projection id="proj_CL_RE" presynapticPopulation="CL" postsynapticPopulation="RE" synapse="ampa">
            <connectionWD id="0" preCellId="../CL/0/L23_E_comp" postCellId="../RE/0/L23_E_comp" weight="0.0065269021" delay="0ms"/>
        </projection>
        <projection id="proj_CL_RH" presynapticPopulation="CL" postsynapticPopulation="RH" synapse="ampa">
            <connectionWD id="0" preCellId="../CL/0/L23_E_comp" postCellId="../RH/0/L23_E_comp" weight="0.0066571881" delay="0ms"/>
        </projection>
        <projection id="proj_CL_RT" presynapticPopulation="CL" postsynapticPopulation="RT" synapse="ampa">
            <connectionWD id="0" preCellId="../CL/0/L23_E_comp" postCellId="../RT/0/L23_E_comp" weight="0.0344885388" delay="0ms"/>
        </projection>
        <projection id="proj_CL_SPA" presynapticPopulation="CL" postsynapticPopulation="SPA" synapse="ampa">
            <connectionWD id="0" preCellId="../CL/0/L23_E_comp" postCellId="../SPA/0/L23_E_comp" weight="0.0095013433" delay="0ms"/>
        </projection>
        <projection id="proj_CL_VPL" presynapticPopulation="CL" postsynapticPopulation="VPL" synapse="ampa">
            <connectionWD id="0" preCellId="../CL/0/L23_E_comp" postCellId="../VPL/0/L23_E_comp" weight="0.0419945275" delay="0ms"/>
        </projection>
        <projection id="proj_IMD_AMd" presynapticPopulation="IMD" postsynapticPopulation="AMd" synapse="ampa">
            <connectionWD id="0" preCellId="../IMD/0/L23_E_comp" postCellId="../AMd/0/L23_E_comp" weight="0.1425528324" delay="0ms"/>
        </projection>
        <projection id="proj_IMD_AMv" presynapticPopulation="IMD" postsynapticPopulation="AMv" synapse="ampa">
            <connectionWD id="0" preCellId="../IMD/0/L23_E_comp" postCellId="../AMv/0/L23_E_comp" weight="0.0759652136" delay="0ms"/>
        </projection>
        <projection id="proj_IMD_RE" presynapticPopulation="IMD" postsynapticPopulation="RE" synapse="ampa">
            <connectionWD id="0" preCellId="../IMD/0/L23_E_comp" postCellId="../RE/0/L23_E_comp" weight="0.0352599933" delay="0ms"/>
        </projection>
        <projection id="proj_IMD_RH" presynapticPopulation="IMD" postsynapticPopulation="RH" synapse="ampa">
            <connectionWD id="0" preCellId="../IMD/0/L23_E_comp" postCellId="../RH/0/L23_E_comp" weight="0.0302447426" delay="0ms"/>
        </projection>
        <projection id="proj_IMD_RT" presynapticPopulation="IMD" postsynapticPopulation="RT" synapse="ampa">
            <connectionWD id="0" preCellId="../IMD/0/L23_E_comp" postCellId="../RT/0/L23_E_comp" weight="0.0785471027" delay="0ms"/>
        </projection>
        <projection id="proj_IMD_SMT" presynapticPopulation="IMD" postsynapticPopulation="SMT" synapse="ampa">
            <connectionWD id="0" preCellId="../IMD/0/L23_E_comp" postCellId="../SMT/0/L23_E_comp" weight="0.0056241426" delay="0ms"/>
        </projection>
        <projection id="proj_IMD_VM" presynapticPopulation="IMD" postsynapticPopulation="VM" synapse="ampa">
            <connectionWD id="0" preCellId="../IMD/0/L23_E_comp" postCellId="../VM/0/L23_E_comp" weight="0.1119641647" delay="0ms"/>
        </projection>
        <projection id="proj_LD_AD" presynapticPopulation="LD" postsynapticPopulation="AD" synapse="ampa">
            <connectionWD id="0" preCellId="../LD/0/L23_E_comp" postCellId="../AD/0/L23_E_comp" weight="0.0031757461" delay="0ms"/>
        </projection>
        <projection id="proj_LD_AMv" presynapticPopulation="LD" postsynapticPopulation="AMv" synapse="ampa">
            <connectionWD id="0" preCellId="../LD/0/L23_E_comp" postCellId="../AMv/0/L23_E_comp" weight="0.0002734569" delay="0ms"/>
        </projection>
        <projection id="proj_LD_AV" presynapticPopulation="LD" postsynapticPopulation="AV" synapse="ampa">
            <connectionWD id="0" preCellId="../LD/0/L23_E_comp" postCellId="../AV/0/L23_E_comp" weight="0.028959273" delay="0ms"/>
        </projection>
        <projection id="proj_LD_LD" presynapticPopulation="LD" postsynapticPopulation="LD" synapse="ampa">
            <connectionWD id="0" preCellId="../LD/0/L23_E_comp" postCellId="../LD/0/L23_E_comp" weight="0.0064634628" delay="0ms"/>
        </projection>
        <projection id="proj_LD_LH" presynapticPopulation="LD" postsynapticPopulation="LH" synapse="ampa">
            <connectionWD id="0" preCellId="../LD/0/L23_E_comp" postCellId="../LH/0/L23_E_comp" weight="0.0005073029" delay="0ms"/>
        </projection>
        <projection id="proj_LD_LP" presynapticPopulation="LD" postsynapticPopulation="LP" synapse="ampa">
            <connectionWD id="0" preCellId="../LD/0/L23_E_comp" postCellId="../LP/0/L23_E_comp" weight="0.011711014" delay="0ms"/>
        </projection>
        <projection id="proj_LD_MH" presynapticPopulation="LD" postsynapticPopulation="MH" synapse="ampa">
            <connectionWD id="0" preCellId="../LD/0/L23_E_comp" postCellId="../MH/0/L23_E_comp" weight="0.0001768958" delay="0ms"/>
        </projection>
        <projection id="proj_LD_RT" presynapticPopulation="LD" postsynapticPopulation="RT" synapse="ampa">
            <connectionWD id="0" preCellId="../LD/0/L23_E_comp" postCellId="../RT/0/L23_E_comp" weight="0.1233025356" delay="0ms"/>
        </projection>
        <projection id="proj_LGd_AD" presynapticPopulation="LGd" postsynapticPopulation="AD" synapse="ampa">
            <connectionWD id="0" preCellId="../LGd/0/L23_E_comp" postCellId="../AD/0/L23_E_comp" weight="0.0091371553" delay="0ms"/>
        </projection>
        <projection id="proj_LGd_AMd" presynapticPopulation="LGd" postsynapticPopulation="AMd" synapse="ampa">
            <connectionWD id="0" preCellId="../LGd/0/L23_E_comp" postCellId="../AMd/0/L23_E_comp" weight="0.0172369373" delay="0ms"/>
        </projection>
        <projection id="proj_LGd_AMv" presynapticPopulation="LGd" postsynapticPopulation="AMv" synapse="ampa">
            <connectionWD id="0" preCellId="../LGd/0/L23_E_comp" postCellId="../AMv/0/L23_E_comp" weight="0.0080779178" delay="0ms"/>
        </projection>
        <projection id="proj_LGd_AV" presynapticPopulation="LGd" postsynapticPopulation="AV" synapse="ampa">
            <connectionWD id="0" preCellId="../LGd/0/L23_E_comp" postCellId="../AV/0/L23_E_comp" weight="0.0155649204" delay="0ms"/>
        </projection>
        <projection id="proj_LGd_CL" presynapticPopulation="LGd" postsynapticPopulation="CL" synapse="ampa">
            <connectionWD id="0" preCellId="../LGd/0/L23_E_comp" postCellId="../CL/0/L23_E_comp" weight="0.0119713676" delay="0ms"/>
        </projection>
        <projection id="proj_LGd_LD" presynapticPopulation="LGd" postsynapticPopulation="LD" synapse="ampa">
            <connectionWD id="0" preCellId="../LGd/0/L23_E_comp" postCellId="../LD/0/L23_E_comp" weight="0.4280375137" delay="0ms"/>
        </projection>
        <projection id="proj_LGd_LGd" presynapticPopulation="LGd" postsynapticPopulation="LGd" synapse="ampa">
            <connectionWD id="0" preCellId="../LGd/0/L23_E_comp" postCellId="../LGd/0/L23_E_comp" weight="0.1647268184" delay="0ms"/>
        </projection>
        <projection id="proj_LGd_LGv" presynapticPopulation="LGd" postsynapticPopulation="LGv" synapse="ampa">
            <connectionWD id="0" preCellId="../LGd/0/L23_E_comp" postCellId="../LGv/0/L23_E_comp" weight="0.1601359043" delay="0ms"/>
        </projection>
        <projection id="proj_LGd_LH" presynapticPopulation="LGd" postsynapticPopulation="LH" synapse="ampa">
            <connectionWD id="0" preCellId="../LGd/0/L23_E_comp" postCellId="../LH/0/L23_E_comp" weight="0.0028319649" delay="0ms"/>
        </projection>
        <projection id="proj_LGd_LP" presynapticPopulation="LGd" postsynapticPopulation="LP" synapse="ampa">
            <connectionWD id="0" preCellId="../LGd/0/L23_E_comp" postCellId="../LP/0/L23_E_comp" weight="0.3101541203" delay="0ms"/>
        </projection>
        <projection id="proj_LGd_MGd" presynapticPopulation="LGd" postsynapticPopulation="MGd" synapse="ampa">
            <connectionWD id="0" preCellId="../LGd/0/L23_E_comp" postCellId="../MGd/0/L23_E_comp" weight="0.0325129163" delay="0ms"/>
        </projection>
        <projection id="proj_LGd_MGm" presynapticPopulation="LGd" postsynapticPopulation="MGm" synapse="ampa">
            <connectionWD id="0" preCellId="../LGd/0/L23_E_comp" postCellId="../MGm/0/L23_E_comp" weight="0.0278174417" delay="0ms"/>
        </projection>
        <projection id="proj_LGd_MGv" presynapticPopulation="LGd" postsynapticPopulation="MGv" synapse="ampa">
            <connectionWD id="0" preCellId="../LGd/0/L23_E_comp" postCellId="../MGv/0/L23_E_comp" weight="0.0301126386" delay="0ms"/>
        </projection>
        <projection id="proj_LGd_MH" presynapticPopulation="LGd" postsynapticPopulation="MH" synapse="ampa">
            <connectionWD id="0" preCellId="../LGd/0/L23_E_comp" postCellId="../MH/0/L23_E_comp" weight="0.0056366131" delay="0ms"/>
        </projection>
        <projection id="proj_LGd_PF" presynapticPopulation="LGd" postsynapticPopulation="PF" synapse="ampa">
            <connectionWD id="0" preCellId="../LGd/0/L23_E_comp" postCellId="../PF/0/L23_E_comp" weight="0.0023277057" delay="0ms"/>
        </projection>
        <projection id="proj_LGd_PO" presynapticPopulation="LGd" postsynapticPopulation="PO" synapse="ampa">
            <connectionWD id="0" preCellId="../LGd/0/L23_E_comp" postCellId="../PO/0/L23_E_comp" weight="0.1728576222" delay="0ms"/>
        </projection>
        <projection id="proj_LGd_POL" presynapticPopulation="LGd" postsynapticPopulation="POL" synapse="ampa">
            <connectionWD id="0" preCellId="../LGd/0/L23_E_comp" postCellId="../POL/0/L23_E_comp" weight="0.0713594607" delay="0ms"/>
        </projection>
        <projection id="proj_LGd_PP" presynapticPopulation="LGd" postsynapticPopulation="PP" synapse="ampa">
            <connectionWD id="0" preCellId="../LGd/0/L23_E_comp" postCellId="../PP/0/L23_E_comp" weight="0.025729631" delay="0ms"/>
        </projection>
        <projection id="proj_LGd_PT" presynapticPopulation="LGd" postsynapticPopulation="PT" synapse="ampa">
            <connectionWD id="0" preCellId="../LGd/0/L23_E_comp" postCellId="../PT/0/L23_E_comp" weight="0.0067346471" delay="0ms"/>
        </projection>
        <projection id="proj_LGd_RE" presynapticPopulation="LGd" postsynapticPopulation="RE" synapse="ampa">
            <connectionWD id="0" preCellId="../LGd/0/L23_E_comp" postCellId="../RE/0/L23_E_comp" weight="0.0174887577" delay="0ms"/>
        </projection>
        <projection id="proj_LGd_RH" presynapticPopulation="LGd" postsynapticPopulation="RH" synapse="ampa">
            <connectionWD id="0" preCellId="../LGd/0/L23_E_comp" postCellId="../RH/0/L23_E_comp" weight="0.0031775926" delay="0ms"/>
        </projection>
        <projection id="proj_LGd_RT" presynapticPopulation="LGd" postsynapticPopulation="RT" synapse="ampa">
            <connectionWD id="0" preCellId="../LGd/0/L23_E_comp" postCellId="../RT/0/L23_E_comp" weight="0.5819319282" delay="0ms"/>
        </projection>
        <projection id="proj_LGd_SMT" presynapticPopulation="LGd" postsynapticPopulation="SMT" synapse="ampa">
            <connectionWD id="0" preCellId="../LGd/0/L23_E_comp" postCellId="../SMT/0/L23_E_comp" weight="0.0071272838" delay="0ms"/>
        </projection>
        <projection id="proj_LGd_SPFm" presynapticPopulation="LGd" postsynapticPopulation="SPFm" synapse="ampa">
            <connectionWD id="0" preCellId="../LGd/0/L23_E_comp" postCellId="../SPFm/0/L23_E_comp" weight="0.008725625" delay="0ms"/>
        </projection>
        <projection id="proj_LGd_SPFp" presynapticPopulation="LGd" postsynapticPopulation="SPFp" synapse="ampa">
            <connectionWD id="0" preCellId="../LGd/0/L23_E_comp" postCellId="../SPFp/0/L23_E_comp" weight="0.1593289792" delay="0ms"/>
        </projection>
        <projection id="proj_LGd_VAL" presynapticPopulation="LGd" postsynapticPopulation="VAL" synapse="ampa">
            <connectionWD id="0" preCellId="../LGd/0/L23_E_comp" postCellId="../VAL/0/L23_E_comp" weight="0.0847789966" delay="0ms"/>
        </projection>
        <projection id="proj_LGd_VM" presynapticPopulation="LGd" postsynapticPopulation="VM" synapse="ampa">
            <connectionWD id="0" preCellId="../LGd/0/L23_E_comp" postCellId="../VM/0/L23_E_comp" weight="0.0130374277" delay="0ms"/>
        </projection>
        <projection id="proj_LGd_VPL" presynapticPopulation="LGd" postsynapticPopulation="VPL" synapse="ampa">
            <connectionWD id="0" preCellId="../LGd/0/L23_E_comp" postCellId="../VPL/0/L23_E_comp" weight="0.1075619413" delay="0ms"/>
        </projection>
        <projection id="proj_LGd_VPM" presynapticPopulation="LGd" postsynapticPopulation="VPM" synapse="ampa">
            <connectionWD id="0" preCellId="../LGd/0/L23_E_comp" postCellId="../VPM/0/L23_E_comp" weight="0.1328914223" delay="0ms"/>
        </projection>
        <projection id="proj_LGv_AD" presynapticPopulation="LGv" postsynapticPopulation="AD" synapse="ampa">
            <connectionWD id="0" preCellId="../LGv/0/L23_E_comp" postCellId="../AD/0/L23_E_comp" weight="0.0043629446" delay="0ms"/>
        </projection>
        <projection id="proj_LGv_AMd" presynapticPopulation="LGv" postsynapticPopulation="AMd" synapse="ampa">
            <connectionWD id="0" preCellId="../LGv/0/L23_E_comp" postCellId="../AMd/0/L23_E_comp" weight="0.0349142482" delay="0ms"/>
        </projection>
        <projection id="proj_LGv_AMv" presynapticPopulation="LGv" postsynapticPopulation="AMv" synapse="ampa">
            <connectionWD id="0" preCellId="../LGv/0/L23_E_comp" postCellId="../AMv/0/L23_E_comp" weight="0.0062202522" delay="0ms"/>
        </projection>
        <projection id="proj_LGv_AV" presynapticPopulation="LGv" postsynapticPopulation="AV" synapse="ampa">
            <connectionWD id="0" preCellId="../LGv/0/L23_E_comp" postCellId="../AV/0/L23_E_comp" weight="0.0485244319" delay="0ms"/>
        </projection>
        <projection id="proj_LGv_CL" presynapticPopulation="LGv" postsynapticPopulation="CL" synapse="ampa">
            <connectionWD id="0" preCellId="../LGv/0/L23_E_comp" postCellId="../CL/0/L23_E_comp" weight="0.1396653768" delay="0ms"/>
        </projection>
        <projection id="proj_LGv_CM" presynapticPopulation="LGv" postsynapticPopulation="CM" synapse="ampa">
            <connectionWD id="0" preCellId="../LGv/0/L23_E_comp" postCellId="../CM/0/L23_E_comp" weight="0.0143534776" delay="0ms"/>
        </projection>
        <projection id="proj_LGv_IMD" presynapticPopulation="LGv" postsynapticPopulation="IMD" synapse="ampa">
            <connectionWD id="0" preCellId="../LGv/0/L23_E_comp" postCellId="../IMD/0/L23_E_comp" weight="0.0125117072" delay="0ms"/>
        </projection>
        <projection id="proj_LGv_LD" presynapticPopulation="LGv" postsynapticPopulation="LD" synapse="ampa">
            <connectionWD id="0" preCellId="../LGv/0/L23_E_comp" postCellId="../LD/0/L23_E_comp" weight="0.4829459574" delay="0ms"/>
        </projection>
        <projection id="proj_LGv_LGd" presynapticPopulation="LGv" postsynapticPopulation="LGd" synapse="ampa">
            <connectionWD id="0" preCellId="../LGv/0/L23_E_comp" postCellId="../LGd/0/L23_E_comp" weight="0.1508377049" delay="0ms"/>
        </projection>
        <projection id="proj_LGv_LGv" presynapticPopulation="LGv" postsynapticPopulation="LGv" synapse="ampa">
            <connectionWD id="0" preCellId="../LGv/0/L23_E_comp" postCellId="../LGv/0/L23_E_comp" weight="0.0281585503" delay="0ms"/>
        </projection>
        <projection id="proj_LGv_LH" presynapticPopulation="LGv" postsynapticPopulation="LH" synapse="ampa">
            <connectionWD id="0" preCellId="../LGv/0/L23_E_comp" postCellId="../LH/0/L23_E_comp" weight="0.1432938451" delay="0ms"/>
        </projection>
        <projection id="proj_LGv_LP" presynapticPopulation="LGv" postsynapticPopulation="LP" synapse="ampa">
            <connectionWD id="0" preCellId="../LGv/0/L23_E_comp" postCellId="../LP/0/L23_E_comp" weight="0.7903343705" delay="0ms"/>
        </projection>
        <projection id="proj_LGv_MGd" presynapticPopulation="LGv" postsynapticPopulation="MGd" synapse="ampa">
            <connectionWD id="0" preCellId="../LGv/0/L23_E_comp" postCellId="../MGd/0/L23_E_comp" weight="0.099966287" delay="0ms"/>
        </projection>
        <projection id="proj_LGv_MGm" presynapticPopulation="LGv" postsynapticPopulation="MGm" synapse="ampa">
            <connectionWD id="0" preCellId="../LGv/0/L23_E_comp" postCellId="../MGm/0/L23_E_comp" weight="0.0109500425" delay="0ms"/>
        </projection>
        <projection id="proj_LGv_MGv" presynapticPopulation="LGv" postsynapticPopulation="MGv" synapse="ampa">
            <connectionWD id="0" preCellId="../LGv/0/L23_E_comp" postCellId="../MGv/0/L23_E_comp" weight="0.0239539221" delay="0ms"/>
        </projection>
        <projection id="proj_LGv_MH" presynapticPopulation="LGv" postsynapticPopulation="MH" synapse="ampa">
            <connectionWD id="0" preCellId="../LGv/0/L23_E_comp" postCellId="../MH/0/L23_E_comp" weight="0.0045418632" delay="0ms"/>
        </projection>
        <projection id="proj_LGv_PF" presynapticPopulation="LGv" postsynapticPopulation="PF" synapse="ampa">
            <connectionWD id="0" preCellId="../LGv/0/L23_E_comp" postCellId="../PF/0/L23_E_comp" weight="0.1129968134" delay="0ms"/>
        </projection>
        <projection id="proj_LGv_PO" presynapticPopulation="LGv" postsynapticPopulation="PO" synapse="ampa">
            <connectionWD id="0" preCellId="../LGv/0/L23_E_comp" postCellId="../PO/0/L23_E_comp" weight="0.2387355051" delay="0ms"/>
        </projection>
        <projection id="proj_LGv_POL" presynapticPopulation="LGv" postsynapticPopulation="POL" synapse="ampa">
            <connectionWD id="0" preCellId="../LGv/0/L23_E_comp" postCellId="../POL/0/L23_E_comp" weight="0.0407541479" delay="0ms"/>
        </projection>
        <projection id="proj_LGv_PP" presynapticPopulation="LGv" postsynapticPopulation="PP" synapse="ampa">
            <connectionWD id="0" preCellId="../LGv/0/L23_E_comp" postCellId="../PP/0/L23_E_comp" weight="0.007896578" delay="0ms"/>
        </projection>
        <projection id="proj_LGv_PVT" presynapticPopulation="LGv" postsynapticPopulation="PVT" synapse="ampa">
            <connectionWD id="0" preCellId="../LGv/0/L23_E_comp" postCellId="../PVT/0/L23_E_comp" weight="0.0470710612" delay="0ms"/>
        </projection>
        <projection id="proj_LGv_RE" presynapticPopulation="LGv" postsynapticPopulation="RE" synapse="ampa">
            <connectionWD id="0" preCellId="../LGv/0/L23_E_comp" postCellId="../RE/0/L23_E_comp" weight="0.1904873536" delay="0ms"/>
        </projection>
        <projection id="proj_LGv_RH" presynapticPopulation="LGv" postsynapticPopulation="RH" synapse="ampa">
            <connectionWD id="0" preCellId="../LGv/0/L23_E_comp" postCellId="../RH/0/L23_E_comp" weight="0.0317997838" delay="0ms"/>
        </projection>
        <projection id="proj_LGv_RT" presynapticPopulation="LGv" postsynapticPopulation="RT" synapse="ampa">
            <connectionWD id="0" preCellId="../LGv/0/L23_E_comp" postCellId="../RT/0/L23_E_comp" weight="0.0467155974" delay="0ms"/>
        </projection>
        <projection id="proj_LGv_SMT" presynapticPopulation="LGv" postsynapticPopulation="SMT" synapse="ampa">
            <connectionWD id="0" preCellId="../LGv/0/L23_E_comp" postCellId="../SMT/0/L23_E_comp" weight="0.0055030231" delay="0ms"/>
        </projection>
        <projection id="proj_LGv_SPA" presynapticPopulation="LGv" postsynapticPopulation="SPA" synapse="ampa">
            <connectionWD id="0" preCellId="../LGv/0/L23_E_comp" postCellId="../SPA/0/L23_E_comp" weight="0.0071978834" delay="0ms"/>
        </projection>
        <projection id="proj_LGv_SPFm" presynapticPopulation="LGv" postsynapticPopulation="SPFm" synapse="ampa">
            <connectionWD id="0" preCellId="../LGv/0/L23_E_comp" postCellId="../SPFm/0/L23_E_comp" weight="0.0264621144" delay="0ms"/>
        </projection>
        <projection id="proj_LGv_SPFp" presynapticPopulation="LGv" postsynapticPopulation="SPFp" synapse="ampa">
            <connectionWD id="0" preCellId="../LGv/0/L23_E_comp" postCellId="../SPFp/0/L23_E_comp" weight="0.0396113722" delay="0ms"/>
        </projection>
        <projection id="proj_LGv_VM" presynapticPopulation="LGv" postsynapticPopulation="VM" synapse="ampa">
            <connectionWD id="0" preCellId="../LGv/0/L23_E_comp" postCellId="../VM/0/L23_E_comp" weight="0.1701339452" delay="0ms"/>
        </projection>
        <projection id="proj_LGv_VPL" presynapticPopulation="LGv" postsynapticPopulation="VPL" synapse="ampa">
            <connectionWD id="0" preCellId="../LGv/0/L23_E_comp" postCellId="../VPL/0/L23_E_comp" weight="0.069500408" delay="0ms"/>
        </projection>
        <projection id="proj_LGv_VPMpc" presynapticPopulation="LGv" postsynapticPopulation="VPMpc" synapse="ampa">
            <connectionWD id="0" preCellId="../LGv/0/L23_E_comp" postCellId="../VPMpc/0/L23_E_comp" weight="0.0016030549" delay="0ms"/>
        </projection>
        <projection id="proj_LH_AMd" presynapticPopulation="LH" postsynapticPopulation="AMd" synapse="ampa">
            <connectionWD id="0" preCellId="../LH/0/L23_E_comp" postCellId="../AMd/0/L23_E_comp" weight="0.1172877452" delay="0ms"/>
        </projection>
        <projection id="proj_LH_AMv" presynapticPopulation="LH" postsynapticPopulation="AMv" synapse="ampa">
            <connectionWD id="0" preCellId="../LH/0/L23_E_comp" postCellId="../AMv/0/L23_E_comp" weight="0.0388028699" delay="0ms"/>
        </projection>
        <projection id="proj_LH_AV" presynapticPopulation="LH" postsynapticPopulation="AV" synapse="ampa">
            <connectionWD id="0" preCellId="../LH/0/L23_E_comp" postCellId="../AV/0/L23_E_comp" weight="0.0022115819" delay="0ms"/>
        </projection>
        <projection id="proj_LH_CM" presynapticPopulation="LH" postsynapticPopulation="CM" synapse="ampa">
            <connectionWD id="0" preCellId="../LH/0/L23_E_comp" postCellId="../CM/0/L23_E_comp" weight="0.0196352858" delay="0ms"/>
        </projection>
        <projection id="proj_LH_IMD" presynapticPopulation="LH" postsynapticPopulation="IMD" synapse="ampa">
            <connectionWD id="0" preCellId="../LH/0/L23_E_comp" postCellId="../IMD/0/L23_E_comp" weight="0.0199680835" delay="0ms"/>
        </projection>
        <projection id="proj_LH_MH" presynapticPopulation="LH" postsynapticPopulation="MH" synapse="ampa">
            <connectionWD id="0" preCellId="../LH/0/L23_E_comp" postCellId="../MH/0/L23_E_comp" weight="0.001453039" delay="0ms"/>
        </projection>
        <projection id="proj_LH_PT" presynapticPopulation="LH" postsynapticPopulation="PT" synapse="ampa">
            <connectionWD id="0" preCellId="../LH/0/L23_E_comp" postCellId="../PT/0/L23_E_comp" weight="0.043088491" delay="0ms"/>
        </projection>
        <projection id="proj_LH_SPA" presynapticPopulation="LH" postsynapticPopulation="SPA" synapse="ampa">
            <connectionWD id="0" preCellId="../LH/0/L23_E_comp" postCellId="../SPA/0/L23_E_comp" weight="0.0036574179" delay="0ms"/>
        </projection>
        <projection id="proj_LH_VM" presynapticPopulation="LH" postsynapticPopulation="VM" synapse="ampa">
            <connectionWD id="0" preCellId="../LH/0/L23_E_comp" postCellId="../VM/0/L23_E_comp" weight="0.125416879" delay="0ms"/>
        </projection>
        <projection id="proj_LP_CL" presynapticPopulation="LP" postsynapticPopulation="CL" synapse="ampa">
            <connectionWD id="0" preCellId="../LP/0/L23_E_comp" postCellId="../CL/0/L23_E_comp" weight="0.0517362255" delay="0ms"/>
        </projection>
        <projection id="proj_LP_IMD" presynapticPopulation="LP" postsynapticPopulation="IMD" synapse="ampa">
            <connectionWD id="0" preCellId="../LP/0/L23_E_comp" postCellId="../IMD/0/L23_E_comp" weight="0.0038668722" delay="0ms"/>
        </projection>
        <projection id="proj_LP_LGv" presynapticPopulation="LP" postsynapticPopulation="LGv" synapse="ampa">
            <connectionWD id="0" preCellId="../LP/0/L23_E_comp" postCellId="../LGv/0/L23_E_comp" weight="0.0536408905" delay="0ms"/>
        </projection>
        <projection id="proj_LP_LH" presynapticPopulation="LP" postsynapticPopulation="LH" synapse="ampa">
            <connectionWD id="0" preCellId="../LP/0/L23_E_comp" postCellId="../LH/0/L23_E_comp" weight="0.0302218579" delay="0ms"/>
        </projection>
        <projection id="proj_LP_MGv" presynapticPopulation="LP" postsynapticPopulation="MGv" synapse="ampa">
            <connectionWD id="0" preCellId="../LP/0/L23_E_comp" postCellId="../MGv/0/L23_E_comp" weight="0.0011528734" delay="0ms"/>
        </projection>
        <projection id="proj_LP_PF" presynapticPopulation="LP" postsynapticPopulation="PF" synapse="ampa">
            <connectionWD id="0" preCellId="../LP/0/L23_E_comp" postCellId="../PF/0/L23_E_comp" weight="0.0019282175" delay="0ms"/>
        </projection>
        <projection id="proj_LP_PP" presynapticPopulation="LP" postsynapticPopulation="PP" synapse="ampa">
            <connectionWD id="0" preCellId="../LP/0/L23_E_comp" postCellId="../PP/0/L23_E_comp" weight="0.0082599357" delay="0ms"/>
        </projection>
        <projection id="proj_LP_RE" presynapticPopulation="LP" postsynapticPopulation="RE" synapse="ampa">
            <connectionWD id="0" preCellId="../LP/0/L23_E_comp" postCellId="../RE/0/L23_E_comp" weight="0.0007368765" delay="0ms"/>
        </projection>
        <projection id="proj_LP_RT" presynapticPopulation="LP" postsynapticPopulation="RT" synapse="ampa">
            <connectionWD id="0" preCellId="../LP/0/L23_E_comp" postCellId="../RT/0/L23_E_comp" weight="0.2491781402" delay="0ms"/>
        </projection>
        <projection id="proj_LP_VM" presynapticPopulation="LP" postsynapticPopulation="VM" synapse="ampa">
            <connectionWD id="0" preCellId="../LP/0/L23_E_comp" postCellId="../VM/0/L23_E_comp" weight="0.0163689945" delay="0ms"/>
        </projection>
        <projection id="proj_MGd_CM" presynapticPopulation="MGd" postsynapticPopulation="CM" synapse="ampa">
            <connectionWD id="0" preCellId="../MGd/0/L23_E_comp" postCellId="../CM/0/L23_E_comp" weight="0.0281138736" delay="0ms"/>
        </projection>
        <projection id="proj_MGd_IMD" presynapticPopulation="MGd" postsynapticPopulation="IMD" synapse="ampa">
            <connectionWD id="0" preCellId="../MGd/0/L23_E_comp" postCellId="../IMD/0/L23_E_comp" weight="0.003192053" delay="0ms"/>
        </projection>
        <projection id="proj_MGd_LGv" presynapticPopulation="MGd" postsynapticPopulation="LGv" synapse="ampa">
            <connectionWD id="0" preCellId="../MGd/0/L23_E_comp" postCellId="../LGv/0/L23_E_comp" weight="0.0405251204" delay="0ms"/>
        </projection>
        <projection id="proj_MGd_LH" presynapticPopulation="MGd" postsynapticPopulation="LH" synapse="ampa">
            <connectionWD id="0" preCellId="../MGd/0/L23_E_comp" postCellId="../LH/0/L23_E_comp" weight="0.0066915729" delay="0ms"/>
        </projection>
        <projection id="proj_MGd_LP" presynapticPopulation="MGd" postsynapticPopulation="LP" synapse="ampa">
            <connectionWD id="0" preCellId="../MGd/0/L23_E_comp" postCellId="../LP/0/L23_E_comp" weight="0.1797054595" delay="0ms"/>
        </projection>
        <projection id="proj_MGd_MGm" presynapticPopulation="MGd" postsynapticPopulation="MGm" synapse="ampa">
            <connectionWD id="0" preCellId="../MGd/0/L23_E_comp" postCellId="../MGm/0/L23_E_comp" weight="0.0278178442" delay="0ms"/>
        </projection>
        <projection id="proj_MGd_MGv" presynapticPopulation="MGd" postsynapticPopulation="MGv" synapse="ampa">
            <connectionWD id="0" preCellId="../MGd/0/L23_E_comp" postCellId="../MGv/0/L23_E_comp" weight="0.0974857341" delay="0ms"/>
        </projection>
        <projection id="proj_MGd_PF" presynapticPopulation="MGd" postsynapticPopulation="PF" synapse="ampa">
            <connectionWD id="0" preCellId="../MGd/0/L23_E_comp" postCellId="../PF/0/L23_E_comp" weight="0.1137915535" delay="0ms"/>
        </projection>
        <projection id="proj_MGd_PO" presynapticPopulation="MGd" postsynapticPopulation="PO" synapse="ampa">
            <connectionWD id="0" preCellId="../MGd/0/L23_E_comp" postCellId="../PO/0/L23_E_comp" weight="0.5735127464" delay="0ms"/>
        </projection>
        <projection id="proj_MGd_PP" presynapticPopulation="MGd" postsynapticPopulation="PP" synapse="ampa">
            <connectionWD id="0" preCellId="../MGd/0/L23_E_comp" postCellId="../PP/0/L23_E_comp" weight="0.0575429391" delay="0ms"/>
        </projection>
        <projection id="proj_MGd_PT" presynapticPopulation="MGd" postsynapticPopulation="PT" synapse="ampa">
            <connectionWD id="0" preCellId="../MGd/0/L23_E_comp" postCellId="../PT/0/L23_E_comp" weight="0.0008938523" delay="0ms"/>
        </projection>
        <projection id="proj_MGd_PVT" presynapticPopulation="MGd" postsynapticPopulation="PVT" synapse="ampa">
            <connectionWD id="0" preCellId="../MGd/0/L23_E_comp" postCellId="../PVT/0/L23_E_comp" weight="0.0011565339" delay="0ms"/>
        </projection>
        <projection id="proj_MGd_RE" presynapticPopulation="MGd" postsynapticPopulation="RE" synapse="ampa">
            <connectionWD id="0" preCellId="../MGd/0/L23_E_comp" postCellId="../RE/0/L23_E_comp" weight="0.0636599335" delay="0ms"/>
        </projection>
        <projection id="proj_MGd_RH" presynapticPopulation="MGd" postsynapticPopulation="RH" synapse="ampa">
            <connectionWD id="0" preCellId="../MGd/0/L23_E_comp" postCellId="../RH/0/L23_E_comp" weight="0.0066287143" delay="0ms"/>
        </projection>
        <projection id="proj_MGd_RT" presynapticPopulation="MGd" postsynapticPopulation="RT" synapse="ampa">
            <connectionWD id="0" preCellId="../MGd/0/L23_E_comp" postCellId="../RT/0/L23_E_comp" weight="0.5641616784" delay="0ms"/>
        </projection>
        <projection id="proj_MGd_SPA" presynapticPopulation="MGd" postsynapticPopulation="SPA" synapse="ampa">
            <connectionWD id="0" preCellId="../MGd/0/L23_E_comp" postCellId="../SPA/0/L23_E_comp" weight="0.0045651135" delay="0ms"/>
        </projection>
        <projection id="proj_MGd_SPFm" presynapticPopulation="MGd" postsynapticPopulation="SPFm" synapse="ampa">
            <connectionWD id="0" preCellId="../MGd/0/L23_E_comp" postCellId="../SPFm/0/L23_E_comp" weight="0.029685203" delay="0ms"/>
        </projection>
        <projection id="proj_MGd_SPFp" presynapticPopulation="MGd" postsynapticPopulation="SPFp" synapse="ampa">
            <connectionWD id="0" preCellId="../MGd/0/L23_E_comp" postCellId="../SPFp/0/L23_E_comp" weight="0.1549229926" delay="0ms"/>
        </projection>
        <projection id="proj_MGd_VM" presynapticPopulation="MGd" postsynapticPopulation="VM" synapse="ampa">
            <connectionWD id="0" preCellId="../MGd/0/L23_E_comp" postCellId="../VM/0/L23_E_comp" weight="0.0064544928" delay="0ms"/>
        </projection>
        <projection id="proj_MGd_VPL" presynapticPopulation="MGd" postsynapticPopulation="VPL" synapse="ampa">
            <connectionWD id="0" preCellId="../MGd/0/L23_E_comp" postCellId="../VPL/0/L23_E_comp" weight="0.2884001176" delay="0ms"/>
        </projection>
        <projection id="proj_MGd_VPM" presynapticPopulation="MGd" postsynapticPopulation="VPM" synapse="ampa">
            <connectionWD id="0" preCellId="../MGd/0/L23_E_comp" postCellId="../VPM/0/L23_E_comp" weight="0.4299604576" delay="0ms"/>
        </projection>
        <projection id="proj_MGd_VPMpc" presynapticPopulation="MGd" postsynapticPopulation="VPMpc" synapse="ampa">
            <connectionWD id="0" preCellId="../MGd/0/L23_E_comp" postCellId="../VPMpc/0/L23_E_comp" weight="0.0228065546" delay="0ms"/>
        </projection>
        <projection id="proj_MGm_PVT" presynapticPopulation="MGm" postsynapticPopulation="PVT" synapse="ampa">
            <connectionWD id="0" preCellId="../MGm/0/L23_E_comp" postCellId="../PVT/0/L23_E_comp" weight="0.0039207185" delay="0ms"/>
        </projection>
        <projection id="proj_MGv_LH" presynapticPopulation="MGv" postsynapticPopulation="LH" synapse="ampa">
            <connectionWD id="0" preCellId="../MGv/0/L23_E_comp" postCellId="../LH/0/L23_E_comp" weight="0.0067482154" delay="0ms"/>
        </projection>
        <projection id="proj_MGv_LP" presynapticPopulation="MGv" postsynapticPopulation="LP" synapse="ampa">
            <connectionWD id="0" preCellId="../MGv/0/L23_E_comp" postCellId="../LP/0/L23_E_comp" weight="0.1105461617" delay="0ms"/>
        </projection>
        <projection id="proj_MGv_MGd" presynapticPopulation="MGv" postsynapticPopulation="MGd" synapse="ampa">
            <connectionWD id="0" preCellId="../MGv/0/L23_E_comp" postCellId="../MGd/0/L23_E_comp" weight="0.0150131484" delay="0ms"/>
        </projection>
        <projection id="proj_MGv_MGm" presynapticPopulation="MGv" postsynapticPopulation="MGm" synapse="ampa">
            <connectionWD id="0" preCellId="../MGv/0/L23_E_comp" postCellId="../MGm/0/L23_E_comp" weight="0.0504306845" delay="0ms"/>
        </projection>
        <projection id="proj_MGv_MGv" presynapticPopulation="MGv" postsynapticPopulation="MGv" synapse="ampa">
            <connectionWD id="0" preCellId="../MGv/0/L23_E_comp" postCellId="../MGv/0/L23_E_comp" weight="0.0656964259" delay="0ms"/>
        </projection>
        <projection id="proj_MGv_MH" presynapticPopulation="MGv" postsynapticPopulation="MH" synapse="ampa">
            <connectionWD id="0" preCellId="../MGv/0/L23_E_comp" postCellId="../MH/0/L23_E_comp" weight="0.0025888724" delay="0ms"/>
        </projection>
        <projection id="proj_MGv_PT" presynapticPopulation="MGv" postsynapticPopulation="PT" synapse="ampa">
            <connectionWD id="0" preCellId="../MGv/0/L23_E_comp" postCellId="../PT/0/L23_E_comp" weight="0.0036742169" delay="0ms"/>
        </projection>
        <projection id="proj_MGv_RT" presynapticPopulation="MGv" postsynapticPopulation="RT" synapse="ampa">
            <connectionWD id="0" preCellId="../MGv/0/L23_E_comp" postCellId="../RT/0/L23_E_comp" weight="0.2851429769" delay="0ms"/>
        </projection>
        <projection id="proj_MGv_SPFm" presynapticPopulation="MGv" postsynapticPopulation="SPFm" synapse="ampa">
            <connectionWD id="0" preCellId="../MGv/0/L23_E_comp" postCellId="../SPFm/0/L23_E_comp" weight="0.0058748679" delay="0ms"/>
        </projection>
        <projection id="proj_MGv_SPFp" presynapticPopulation="MGv" postsynapticPopulation="SPFp" synapse="ampa">
            <connectionWD id="0" preCellId="../MGv/0/L23_E_comp" postCellId="../SPFp/0/L23_E_comp" weight="0.0682588923" delay="0ms"/>
        </projection>
        <projection id="proj_MH_AD" presynapticPopulation="MH" postsynapticPopulation="AD" synapse="ampa">
            <connectionWD id="0" preCellId="../MH/0/L23_E_comp" postCellId="../AD/0/L23_E_comp" weight="0.0216556087" delay="0ms"/>
        </projection>
        <projection id="proj_MH_CM" presynapticPopulation="MH" postsynapticPopulation="CM" synapse="ampa">
            <connectionWD id="0" preCellId="../MH/0/L23_E_comp" postCellId="../CM/0/L23_E_comp" weight="0.3436189698" delay="0ms"/>
        </projection>
        <projection id="proj_MH_IMD" presynapticPopulation="MH" postsynapticPopulation="IMD" synapse="ampa">
            <connectionWD id="0" preCellId="../MH/0/L23_E_comp" postCellId="../IMD/0/L23_E_comp" weight="0.0057220137" delay="0ms"/>
        </projection>
        <projection id="proj_MH_LH" presynapticPopulation="MH" postsynapticPopulation="LH" synapse="ampa">
            <connectionWD id="0" preCellId="../MH/0/L23_E_comp" postCellId="../LH/0/L23_E_comp" weight="0.201003079" delay="0ms"/>
        </projection>
        <projection id="proj_MH_PF" presynapticPopulation="MH" postsynapticPopulation="PF" synapse="ampa">
            <connectionWD id="0" preCellId="../MH/0/L23_E_comp" postCellId="../PF/0/L23_E_comp" weight="0.8486581236" delay="0ms"/>
        </projection>
        <projection id="proj_MH_PT" presynapticPopulation="MH" postsynapticPopulation="PT" synapse="ampa">
            <connectionWD id="0" preCellId="../MH/0/L23_E_comp" postCellId="../PT/0/L23_E_comp" weight="0.0976622717" delay="0ms"/>
        </projection>
        <projection id="proj_MH_PVT" presynapticPopulation="MH" postsynapticPopulation="PVT" synapse="ampa">
            <connectionWD id="0" preCellId="../MH/0/L23_E_comp" postCellId="../PVT/0/L23_E_comp" weight="0.2985847697" delay="0ms"/>
        </projection>
        <projection id="proj_MH_RE" presynapticPopulation="MH" postsynapticPopulation="RE" synapse="ampa">
            <connectionWD id="0" preCellId="../MH/0/L23_E_comp" postCellId="../RE/0/L23_E_comp" weight="0.5855146937" delay="0ms"/>
        </projection>
        <projection id="proj_MH_RH" presynapticPopulation="MH" postsynapticPopulation="RH" synapse="ampa">
            <connectionWD id="0" preCellId="../MH/0/L23_E_comp" postCellId="../RH/0/L23_E_comp" weight="0.170045276" delay="0ms"/>
        </projection>
        <projection id="proj_MH_RT" presynapticPopulation="MH" postsynapticPopulation="RT" synapse="ampa">
            <connectionWD id="0" preCellId="../MH/0/L23_E_comp" postCellId="../RT/0/L23_E_comp" weight="0.0131276643" delay="0ms"/>
        </projection>
        <projection id="proj_MH_SMT" presynapticPopulation="MH" postsynapticPopulation="SMT" synapse="ampa">
            <connectionWD id="0" preCellId="../MH/0/L23_E_comp" postCellId="../SMT/0/L23_E_comp" weight="0.1841699159" delay="0ms"/>
        </projection>
        <projection id="proj_MH_SPA" presynapticPopulation="MH" postsynapticPopulation="SPA" synapse="ampa">
            <connectionWD id="0" preCellId="../MH/0/L23_E_comp" postCellId="../SPA/0/L23_E_comp" weight="0.057572489" delay="0ms"/>
        </projection>
        <projection id="proj_MH_SPFm" presynapticPopulation="MH" postsynapticPopulation="SPFm" synapse="ampa">
            <connectionWD id="0" preCellId="../MH/0/L23_E_comp" postCellId="../SPFm/0/L23_E_comp" weight="0.0372965333" delay="0ms"/>
        </projection>
        <projection id="proj_MH_VAL" presynapticPopulation="MH" postsynapticPopulation="VAL" synapse="ampa">
            <connectionWD id="0" preCellId="../MH/0/L23_E_comp" postCellId="../VAL/0/L23_E_comp" weight="0.0134118046" delay="0ms"/>
        </projection>
        <projection id="proj_MH_VM" presynapticPopulation="MH" postsynapticPopulation="VM" synapse="ampa">
            <connectionWD id="0" preCellId="../MH/0/L23_E_comp" postCellId="../VM/0/L23_E_comp" weight="0.0258602834" delay="0ms"/>
        </projection>
        <projection id="proj_PF_CM" presynapticPopulation="PF" postsynapticPopulation="CM" synapse="ampa">
            <connectionWD id="0" preCellId="../PF/0/L23_E_comp" postCellId="../CM/0/L23_E_comp" weight="0.015647947" delay="0ms"/>
        </projection>
        <projection id="proj_PF_IMD" presynapticPopulation="PF" postsynapticPopulation="IMD" synapse="ampa">
            <connectionWD id="0" preCellId="../PF/0/L23_E_comp" postCellId="../IMD/0/L23_E_comp" weight="0.0040767403" delay="0ms"/>
        </projection>
        <projection id="proj_PF_LD" presynapticPopulation="PF" postsynapticPopulation="LD" synapse="ampa">
            <connectionWD id="0" preCellId="../PF/0/L23_E_comp" postCellId="../LD/0/L23_E_comp" weight="0.0571388616" delay="0ms"/>
        </projection>
        <projection id="proj_PF_LGd" presynapticPopulation="PF" postsynapticPopulation="LGd" synapse="ampa">
            <connectionWD id="0" preCellId="../PF/0/L23_E_comp" postCellId="../LGd/0/L23_E_comp" weight="0.0093084478" delay="0ms"/>
        </projection>
        <projection id="proj_PF_LGv" presynapticPopulation="PF" postsynapticPopulation="LGv" synapse="ampa">
            <connectionWD id="0" preCellId="../PF/0/L23_E_comp" postCellId="../LGv/0/L23_E_comp" weight="0.043075296" delay="0ms"/>
        </projection>
        <projection id="proj_PF_POL" presynapticPopulation="PF" postsynapticPopulation="POL" synapse="ampa">
            <connectionWD id="0" preCellId="../PF/0/L23_E_comp" postCellId="../POL/0/L23_E_comp" weight="0.0102502944" delay="0ms"/>
        </projection>
        <projection id="proj_PF_PP" presynapticPopulation="PF" postsynapticPopulation="PP" synapse="ampa">
            <connectionWD id="0" preCellId="../PF/0/L23_E_comp" postCellId="../PP/0/L23_E_comp" weight="0.0094136833" delay="0ms"/>
        </projection>
        <projection id="proj_PF_VAL" presynapticPopulation="PF" postsynapticPopulation="VAL" synapse="ampa">
            <connectionWD id="0" preCellId="../PF/0/L23_E_comp" postCellId="../VAL/0/L23_E_comp" weight="0.2274072483" delay="0ms"/>
        </projection>
        <projection id="proj_PF_VM" presynapticPopulation="PF" postsynapticPopulation="VM" synapse="ampa">
            <connectionWD id="0" preCellId="../PF/0/L23_E_comp" postCellId="../VM/0/L23_E_comp" weight="0.0522065918" delay="0ms"/>
        </projection>
        <projection id="proj_PF_VPM" presynapticPopulation="PF" postsynapticPopulation="VPM" synapse="ampa">
            <connectionWD id="0" preCellId="../PF/0/L23_E_comp" postCellId="../VPM/0/L23_E_comp" weight="0.0252474488" delay="0ms"/>
        </projection>
        <projection id="proj_PF_VPMpc" presynapticPopulation="PF" postsynapticPopulation="VPMpc" synapse="ampa">
            <connectionWD id="0" preCellId="../PF/0/L23_E_comp" postCellId="../VPMpc/0/L23_E_comp" weight="0.002157774" delay="0ms"/>
        </projection>
        <projection id="proj_PO_AMd" presynapticPopulation="PO" postsynapticPopulation="AMd" synapse="ampa">
            <connectionWD id="0" preCellId="../PO/0/L23_E_comp" postCellId="../AMd/0/L23_E_comp" weight="0.0025470421" delay="0ms"/>
        </projection>
        <projection id="proj_PO_AV" presynapticPopulation="PO" postsynapticPopulation="AV" synapse="ampa">
            <connectionWD id="0" preCellId="../PO/0/L23_E_comp" postCellId="../AV/0/L23_E_comp" weight="0.0035603974" delay="0ms"/>
        </projection>
        <projection id="proj_PO_CL" presynapticPopulation="PO" postsynapticPopulation="CL" synapse="ampa">
            <connectionWD id="0" preCellId="../PO/0/L23_E_comp" postCellId="../CL/0/L23_E_comp" weight="0.0222963481" delay="0ms"/>
        </projection>
        <projection id="proj_PO_CM" presynapticPopulation="PO" postsynapticPopulation="CM" synapse="ampa">
            <connectionWD id="0" preCellId="../PO/0/L23_E_comp" postCellId="../CM/0/L23_E_comp" weight="0.0002933625" delay="0ms"/>
        </projection>
        <projection id="proj_PO_LD" presynapticPopulation="PO" postsynapticPopulation="LD" synapse="ampa">
            <connectionWD id="0" preCellId="../PO/0/L23_E_comp" postCellId="../LD/0/L23_E_comp" weight="0.0523234572" delay="0ms"/>
        </projection>
        <projection id="proj_PO_LGd" presynapticPopulation="PO" postsynapticPopulation="LGd" synapse="ampa">
            <connectionWD id="0" preCellId="../PO/0/L23_E_comp" postCellId="../LGd/0/L23_E_comp" weight="0.0135467071" delay="0ms"/>
        </projection>
        <projection id="proj_PO_LGv" presynapticPopulation="PO" postsynapticPopulation="LGv" synapse="ampa">
            <connectionWD id="0" preCellId="../PO/0/L23_E_comp" postCellId="../LGv/0/L23_E_comp" weight="0.0060260103" delay="0ms"/>
        </projection>
        <projection id="proj_PO_LH" presynapticPopulation="PO" postsynapticPopulation="LH" synapse="ampa">
            <connectionWD id="0" preCellId="../PO/0/L23_E_comp" postCellId="../LH/0/L23_E_comp" weight="0.0060549236" delay="0ms"/>
        </projection>
        <projection id="proj_PO_LP" presynapticPopulation="PO" postsynapticPopulation="LP" synapse="ampa">
            <connectionWD id="0" preCellId="../PO/0/L23_E_comp" postCellId="../LP/0/L23_E_comp" weight="0.0276544027" delay="0ms"/>
        </projection>
        <projection id="proj_PO_MGd" presynapticPopulation="PO" postsynapticPopulation="MGd" synapse="ampa">
            <connectionWD id="0" preCellId="../PO/0/L23_E_comp" postCellId="../MGd/0/L23_E_comp" weight="0.0006772517" delay="0ms"/>
        </projection>
        <projection id="proj_PO_MGm" presynapticPopulation="PO" postsynapticPopulation="MGm" synapse="ampa">
            <connectionWD id="0" preCellId="../PO/0/L23_E_comp" postCellId="../MGm/0/L23_E_comp" weight="0.0026630774" delay="0ms"/>
        </projection>
        <projection id="proj_PO_MGv" presynapticPopulation="PO" postsynapticPopulation="MGv" synapse="ampa">
            <connectionWD id="0" preCellId="../PO/0/L23_E_comp" postCellId="../MGv/0/L23_E_comp" weight="0.0075284972" delay="0ms"/>
        </projection>
        <projection id="proj_PO_MH" presynapticPopulation="PO" postsynapticPopulation="MH" synapse="ampa">
            <connectionWD id="0" preCellId="../PO/0/L23_E_comp" postCellId="../MH/0/L23_E_comp" weight="0.0003594863" delay="0ms"/>
        </projection>
        <projection id="proj_PO_PF" presynapticPopulation="PO" postsynapticPopulation="PF" synapse="ampa">
            <connectionWD id="0" preCellId="../PO/0/L23_E_comp" postCellId="../PF/0/L23_E_comp" weight="0.0185641821" delay="0ms"/>
        </projection>
        <projection id="proj_PO_PO" presynapticPopulation="PO" postsynapticPopulation="PO" synapse="ampa">
            <connectionWD id="0" preCellId="../PO/0/L23_E_comp" postCellId="../PO/0/L23_E_comp" weight="0.0467038842" delay="0ms"/>
        </projection>
        <projection id="proj_PO_POL" presynapticPopulation="PO" postsynapticPopulation="POL" synapse="ampa">
            <connectionWD id="0" preCellId="../PO/0/L23_E_comp" postCellId="../POL/0/L23_E_comp" weight="0.0083078338" delay="0ms"/>
        </projection>
        <projection id="proj_PO_PVT" presynapticPopulation="PO" postsynapticPopulation="PVT" synapse="ampa">
            <connectionWD id="0" preCellId="../PO/0/L23_E_comp" postCellId="../PVT/0/L23_E_comp" weight="0.0011510655" delay="0ms"/>
        </projection>
        <projection id="proj_PO_RE" presynapticPopulation="PO" postsynapticPopulation="RE" synapse="ampa">
            <connectionWD id="0" preCellId="../PO/0/L23_E_comp" postCellId="../RE/0/L23_E_comp" weight="0.0049812729" delay="0ms"/>
        </projection>
        <projection id="proj_PO_RH" presynapticPopulation="PO" postsynapticPopulation="RH" synapse="ampa">
            <connectionWD id="0" preCellId="../PO/0/L23_E_comp" postCellId="../RH/0/L23_E_comp" weight="0.0007881332" delay="0ms"/>
        </projection>
        <projection id="proj_PO_RT" presynapticPopulation="PO" postsynapticPopulation="RT" synapse="ampa">
            <connectionWD id="0" preCellId="../PO/0/L23_E_comp" postCellId="../RT/0/L23_E_comp" weight="0.2708197295" delay="0ms"/>
        </projection>
        <projection id="proj_PO_SMT" presynapticPopulation="PO" postsynapticPopulation="SMT" synapse="ampa">
            <connectionWD id="0" preCellId="../PO/0/L23_E_comp" postCellId="../SMT/0/L23_E_comp" weight="0.0004992468" delay="0ms"/>
        </projection>
        <projection id="proj_PO_SPFm" presynapticPopulation="PO" postsynapticPopulation="SPFm" synapse="ampa">
            <connectionWD id="0" preCellId="../PO/0/L23_E_comp" postCellId="../SPFm/0/L23_E_comp" weight="0.0030208612" delay="0ms"/>
        </projection>
        <projection id="proj_PO_SPFp" presynapticPopulation="PO" postsynapticPopulation="SPFp" synapse="ampa">
            <connectionWD id="0" preCellId="../PO/0/L23_E_comp" postCellId="../SPFp/0/L23_E_comp" weight="0.0092625371" delay="0ms"/>
        </projection>
        <projection id="proj_PO_VAL" presynapticPopulation="PO" postsynapticPopulation="VAL" synapse="ampa">
            <connectionWD id="0" preCellId="../PO/0/L23_E_comp" postCellId="../VAL/0/L23_E_comp" weight="0.0287301103" delay="0ms"/>
        </projection>
        <projection id="proj_PO_VM" presynapticPopulation="PO" postsynapticPopulation="VM" synapse="ampa">
            <connectionWD id="0" preCellId="../PO/0/L23_E_comp" postCellId="../VM/0/L23_E_comp" weight="0.0106868275" delay="0ms"/>
        </projection>
        <projection id="proj_PO_VPL" presynapticPopulation="PO" postsynapticPopulation="VPL" synapse="ampa">
            <connectionWD id="0" preCellId="../PO/0/L23_E_comp" postCellId="../VPL/0/L23_E_comp" weight="0.2061195952" delay="0ms"/>
        </projection>
        <projection id="proj_PO_VPM" presynapticPopulation="PO" postsynapticPopulation="VPM" synapse="ampa">
            <connectionWD id="0" preCellId="../PO/0/L23_E_comp" postCellId="../VPM/0/L23_E_comp" weight="0.2513543705" delay="0ms"/>
        </projection>
        <projection id="proj_POL_IMD" presynapticPopulation="POL" postsynapticPopulation="IMD" synapse="ampa">
            <connectionWD id="0" preCellId="../POL/0/L23_E_comp" postCellId="../IMD/0/L23_E_comp" weight="0.0210327265" delay="0ms"/>
        </projection>
        <projection id="proj_POL_LH" presynapticPopulation="POL" postsynapticPopulation="LH" synapse="ampa">
            <connectionWD id="0" preCellId="../POL/0/L23_E_comp" postCellId="../LH/0/L23_E_comp" weight="0.0004859833" delay="0ms"/>
        </projection>
        <projection id="proj_POL_PF" presynapticPopulation="POL" postsynapticPopulation="PF" synapse="ampa">
            <connectionWD id="0" preCellId="../POL/0/L23_E_comp" postCellId="../PF/0/L23_E_comp" weight="0.0696831113" delay="0ms"/>
        </projection>
        <projection id="proj_POL_PVT" presynapticPopulation="POL" postsynapticPopulation="PVT" synapse="ampa">
            <connectionWD id="0" preCellId="../POL/0/L23_E_comp" postCellId="../PVT/0/L23_E_comp" weight="0.0300975921" delay="0ms"/>
        </projection>
        <projection id="proj_POL_RE" presynapticPopulation="POL" postsynapticPopulation="RE" synapse="ampa">
            <connectionWD id="0" preCellId="../POL/0/L23_E_comp" postCellId="../RE/0/L23_E_comp" weight="0.0166274132" delay="0ms"/>
        </projection>
        <projection id="proj_POL_RT" presynapticPopulation="POL" postsynapticPopulation="RT" synapse="ampa">
            <connectionWD id="0" preCellId="../POL/0/L23_E_comp" postCellId="../RT/0/L23_E_comp" weight="0.1231016528" delay="0ms"/>
        </projection>
        <projection id="proj_POL_SPA" presynapticPopulation="POL" postsynapticPopulation="SPA" synapse="ampa">
            <connectionWD id="0" preCellId="../POL/0/L23_E_comp" postCellId="../SPA/0/L23_E_comp" weight="0.0314063392" delay="0ms"/>
        </projection>
        <projection id="proj_POL_SPFm" presynapticPopulation="POL" postsynapticPopulation="SPFm" synapse="ampa">
            <connectionWD id="0" preCellId="../POL/0/L23_E_comp" postCellId="../SPFm/0/L23_E_comp" weight="0.0267550474" delay="0ms"/>
        </projection>
        <projection id="proj_POL_SPFp" presynapticPopulation="POL" postsynapticPopulation="SPFp" synapse="ampa">
            <connectionWD id="0" preCellId="../POL/0/L23_E_comp" postCellId="../SPFp/0/L23_E_comp" weight="0.0787236532" delay="0ms"/>
        </projection>
        <projection id="proj_POL_VPL" presynapticPopulation="POL" postsynapticPopulation="VPL" synapse="ampa">
            <connectionWD id="0" preCellId="../POL/0/L23_E_comp" postCellId="../VPL/0/L23_E_comp" weight="0.1834671389" delay="0ms"/>
        </projection>
        <projection id="proj_POL_VPMpc" presynapticPopulation="POL" postsynapticPopulation="VPMpc" synapse="ampa">
            <connectionWD id="0" preCellId="../POL/0/L23_E_comp" postCellId="../VPMpc/0/L23_E_comp" weight="0.0111875315" delay="0ms"/>
        </projection>
        <projection id="proj_PP_LH" presynapticPopulation="PP" postsynapticPopulation="LH" synapse="ampa">
            <connectionWD id="0" preCellId="../PP/0/L23_E_comp" postCellId="../LH/0/L23_E_comp" weight="0.0086324009" delay="0ms"/>
        </projection>
        <projection id="proj_PP_LP" presynapticPopulation="PP" postsynapticPopulation="LP" synapse="ampa">
            <connectionWD id="0" preCellId="../PP/0/L23_E_comp" postCellId="../LP/0/L23_E_comp" weight="0.0007447653" delay="0ms"/>
        </projection>
        <projection id="proj_PP_MGd" presynapticPopulation="PP" postsynapticPopulation="MGd" synapse="ampa">
            <connectionWD id="0" preCellId="../PP/0/L23_E_comp" postCellId="../MGd/0/L23_E_comp" weight="0.0246229189" delay="0ms"/>
        </projection>
        <projection id="proj_PP_MH" presynapticPopulation="PP" postsynapticPopulation="MH" synapse="ampa">
            <connectionWD id="0" preCellId="../PP/0/L23_E_comp" postCellId="../MH/0/L23_E_comp" weight="0.0127750571" delay="0ms"/>
        </projection>
        <projection id="proj_PP_PT" presynapticPopulation="PP" postsynapticPopulation="PT" synapse="ampa">
            <connectionWD id="0" preCellId="../PP/0/L23_E_comp" postCellId="../PT/0/L23_E_comp" weight="0.0272834558" delay="0ms"/>
        </projection>
        <projection id="proj_PP_PVT" presynapticPopulation="PP" postsynapticPopulation="PVT" synapse="ampa">
            <connectionWD id="0" preCellId="../PP/0/L23_E_comp" postCellId="../PVT/0/L23_E_comp" weight="0.0907661749" delay="0ms"/>
        </projection>
        <projection id="proj_PP_RE" presynapticPopulation="PP" postsynapticPopulation="RE" synapse="ampa">
            <connectionWD id="0" preCellId="../PP/0/L23_E_comp" postCellId="../RE/0/L23_E_comp" weight="0.173582252" delay="0ms"/>
        </projection>
        <projection id="proj_PP_SPFm" presynapticPopulation="PP" postsynapticPopulation="SPFm" synapse="ampa">
            <connectionWD id="0" preCellId="../PP/0/L23_E_comp" postCellId="../SPFm/0/L23_E_comp" weight="0.1380515757" delay="0ms"/>
        </projection>
        <projection id="proj_PT_AV" presynapticPopulation="PT" postsynapticPopulation="AV" synapse="ampa">
            <connectionWD id="0" preCellId="../PT/0/L23_E_comp" postCellId="../AV/0/L23_E_comp" weight="0.0014868414" delay="0ms"/>
        </projection>
        <projection id="proj_PT_LGd" presynapticPopulation="PT" postsynapticPopulation="LGd" synapse="ampa">
            <connectionWD id="0" preCellId="../PT/0/L23_E_comp" postCellId="../LGd/0/L23_E_comp" weight="0.0094674554" delay="0ms"/>
        </projection>
        <projection id="proj_PT_LGv" presynapticPopulation="PT" postsynapticPopulation="LGv" synapse="ampa">
            <connectionWD id="0" preCellId="../PT/0/L23_E_comp" postCellId="../LGv/0/L23_E_comp" weight="0.0263328052" delay="0ms"/>
        </projection>
        <projection id="proj_PT_LH" presynapticPopulation="PT" postsynapticPopulation="LH" synapse="ampa">
            <connectionWD id="0" preCellId="../PT/0/L23_E_comp" postCellId="../LH/0/L23_E_comp" weight="0.0301075195" delay="0ms"/>
        </projection>
        <projection id="proj_PT_MGd" presynapticPopulation="PT" postsynapticPopulation="MGd" synapse="ampa">
            <connectionWD id="0" preCellId="../PT/0/L23_E_comp" postCellId="../MGd/0/L23_E_comp" weight="0.0044613437" delay="0ms"/>
        </projection>
        <projection id="proj_PT_MGm" presynapticPopulation="PT" postsynapticPopulation="MGm" synapse="ampa">
            <connectionWD id="0" preCellId="../PT/0/L23_E_comp" postCellId="../MGm/0/L23_E_comp" weight="0.00313854" delay="0ms"/>
        </projection>
        <projection id="proj_PT_MGv" presynapticPopulation="PT" postsynapticPopulation="MGv" synapse="ampa">
            <connectionWD id="0" preCellId="../PT/0/L23_E_comp" postCellId="../MGv/0/L23_E_comp" weight="0.015982856" delay="0ms"/>
        </projection>
        <projection id="proj_PT_MH" presynapticPopulation="PT" postsynapticPopulation="MH" synapse="ampa">
            <connectionWD id="0" preCellId="../PT/0/L23_E_comp" postCellId="../MH/0/L23_E_comp" weight="0.0068271501" delay="0ms"/>
        </projection>
        <projection id="proj_PT_POL" presynapticPopulation="PT" postsynapticPopulation="POL" synapse="ampa">
            <connectionWD id="0" preCellId="../PT/0/L23_E_comp" postCellId="../POL/0/L23_E_comp" weight="0.002602748" delay="0ms"/>
        </projection>
        <projection id="proj_PT_PP" presynapticPopulation="PT" postsynapticPopulation="PP" synapse="ampa">
            <connectionWD id="0" preCellId="../PT/0/L23_E_comp" postCellId="../PP/0/L23_E_comp" weight="0.0004934969" delay="0ms"/>
        </projection>
        <projection id="proj_PVT_AMd" presynapticPopulation="PVT" postsynapticPopulation="AMd" synapse="ampa">
            <connectionWD id="0" preCellId="../PVT/0/L23_E_comp" postCellId="../AMd/0/L23_E_comp" weight="0.0111851465" delay="0ms"/>
        </projection>
        <projection id="proj_PVT_AMv" presynapticPopulation="PVT" postsynapticPopulation="AMv" synapse="ampa">
            <connectionWD id="0" preCellId="../PVT/0/L23_E_comp" postCellId="../AMv/0/L23_E_comp" weight="0.0055382946" delay="0ms"/>
        </projection>
        <projection id="proj_PVT_IMD" presynapticPopulation="PVT" postsynapticPopulation="IMD" synapse="ampa">
            <connectionWD id="0" preCellId="../PVT/0/L23_E_comp" postCellId="../IMD/0/L23_E_comp" weight="0.0017845975" delay="0ms"/>
        </projection>
        <projection id="proj_PVT_MH" presynapticPopulation="PVT" postsynapticPopulation="MH" synapse="ampa">
            <connectionWD id="0" preCellId="../PVT/0/L23_E_comp" postCellId="../MH/0/L23_E_comp" weight="0.004625306" delay="0ms"/>
        </projection>
        <projection id="proj_PVT_PVT" presynapticPopulation="PVT" postsynapticPopulation="PVT" synapse="ampa">
            <connectionWD id="0" preCellId="../PVT/0/L23_E_comp" postCellId="../PVT/0/L23_E_comp" weight="0.0057492443" delay="0ms"/>
        </projection>
        <projection id="proj_RE_SPA" presynapticPopulation="RE" postsynapticPopulation="SPA" synapse="ampa">
            <connectionWD id="0" preCellId="../RE/0/L23_E_comp" postCellId="../SPA/0/L23_E_comp" weight="0.000101569" delay="0ms"/>
        </projection>
        <projection id="proj_RT_AD" presynapticPopulation="RT" postsynapticPopulation="AD" synapse="ampa">
            <connectionWD id="0" preCellId="../RT/0/L23_E_comp" postCellId="../AD/0/L23_E_comp" weight="0.0087898899" delay="0ms"/>
        </projection>
        <projection id="proj_RT_AMd" presynapticPopulation="RT" postsynapticPopulation="AMd" synapse="ampa">
            <connectionWD id="0" preCellId="../RT/0/L23_E_comp" postCellId="../AMd/0/L23_E_comp" weight="0.0536880688" delay="0ms"/>
        </projection>
        <projection id="proj_RT_AMv" presynapticPopulation="RT" postsynapticPopulation="AMv" synapse="ampa">
            <connectionWD id="0" preCellId="../RT/0/L23_E_comp" postCellId="../AMv/0/L23_E_comp" weight="0.0072783145" delay="0ms"/>
        </projection>
        <projection id="proj_RT_AV" presynapticPopulation="RT" postsynapticPopulation="AV" synapse="ampa">
            <connectionWD id="0" preCellId="../RT/0/L23_E_comp" postCellId="../AV/0/L23_E_comp" weight="0.0247239466" delay="0ms"/>
        </projection>
        <projection id="proj_RT_CL" presynapticPopulation="RT" postsynapticPopulation="CL" synapse="ampa">
            <connectionWD id="0" preCellId="../RT/0/L23_E_comp" postCellId="../CL/0/L23_E_comp" weight="0.1868261804" delay="0ms"/>
        </projection>
        <projection id="proj_RT_CM" presynapticPopulation="RT" postsynapticPopulation="CM" synapse="ampa">
            <connectionWD id="0" preCellId="../RT/0/L23_E_comp" postCellId="../CM/0/L23_E_comp" weight="0.156771709" delay="0ms"/>
        </projection>
        <projection id="proj_RT_IMD" presynapticPopulation="RT" postsynapticPopulation="IMD" synapse="ampa">
            <connectionWD id="0" preCellId="../RT/0/L23_E_comp" postCellId="../IMD/0/L23_E_comp" weight="0.0248701718" delay="0ms"/>
        </projection>
        <projection id="proj_RT_LD" presynapticPopulation="RT" postsynapticPopulation="LD" synapse="ampa">
            <connectionWD id="0" preCellId="../RT/0/L23_E_comp" postCellId="../LD/0/L23_E_comp" weight="0.0923379107" delay="0ms"/>
        </projection>
        <projection id="proj_RT_LH" presynapticPopulation="RT" postsynapticPopulation="LH" synapse="ampa">
            <connectionWD id="0" preCellId="../RT/0/L23_E_comp" postCellId="../LH/0/L23_E_comp" weight="0.0342454387" delay="0ms"/>
        </projection>
        <projection id="proj_RT_LP" presynapticPopulation="RT" postsynapticPopulation="LP" synapse="ampa">
            <connectionWD id="0" preCellId="../RT/0/L23_E_comp" postCellId="../LP/0/L23_E_comp" weight="0.0434940511" delay="0ms"/>
        </projection>
        <projection id="proj_RT_PF" presynapticPopulation="RT" postsynapticPopulation="PF" synapse="ampa">
            <connectionWD id="0" preCellId="../RT/0/L23_E_comp" postCellId="../PF/0/L23_E_comp" weight="0.4458047537" delay="0ms"/>
        </projection>
        <projection id="proj_RT_PO" presynapticPopulation="RT" postsynapticPopulation="PO" synapse="ampa">
            <connectionWD id="0" preCellId="../RT/0/L23_E_comp" postCellId="../PO/0/L23_E_comp" weight="0.3828314279" delay="0ms"/>
        </projection>
        <projection id="proj_RT_PVT" presynapticPopulation="RT" postsynapticPopulation="PVT" synapse="ampa">
            <connectionWD id="0" preCellId="../RT/0/L23_E_comp" postCellId="../PVT/0/L23_E_comp" weight="0.0151543129" delay="0ms"/>
        </projection>
        <projection id="proj_RT_RH" presynapticPopulation="RT" postsynapticPopulation="RH" synapse="ampa">
            <connectionWD id="0" preCellId="../RT/0/L23_E_comp" postCellId="../RH/0/L23_E_comp" weight="0.025486203" delay="0ms"/>
        </projection>
        <projection id="proj_RT_SMT" presynapticPopulation="RT" postsynapticPopulation="SMT" synapse="ampa">
            <connectionWD id="0" preCellId="../RT/0/L23_E_comp" postCellId="../SMT/0/L23_E_comp" weight="0.0198099021" delay="0ms"/>
        </projection>
        <projection id="proj_RT_SPA" presynapticPopulation="RT" postsynapticPopulation="SPA" synapse="ampa">
            <connectionWD id="0" preCellId="../RT/0/L23_E_comp" postCellId="../SPA/0/L23_E_comp" weight="0.0103379086" delay="0ms"/>
        </projection>
        <projection id="proj_RT_SPFp" presynapticPopulation="RT" postsynapticPopulation="SPFp" synapse="ampa">
            <connectionWD id="0" preCellId="../RT/0/L23_E_comp" postCellId="../SPFp/0/L23_E_comp" weight="0.0175115058" delay="0ms"/>
        </projection>
        <projection id="proj_RT_VAL" presynapticPopulation="RT" postsynapticPopulation="VAL" synapse="ampa">
            <connectionWD id="0" preCellId="../RT/0/L23_E_comp" postCellId="../VAL/0/L23_E_comp" weight="1.1221020554" delay="0ms"/>
        </projection>
        <projection id="proj_RT_VM" presynapticPopulation="RT" postsynapticPopulation="VM" synapse="ampa">
            <connectionWD id="0" preCellId="../RT/0/L23_E_comp" postCellId="../VM/0/L23_E_comp" weight="0.1980579468" delay="0ms"/>
        </projection>
        <projection id="proj_RT_VPL" presynapticPopulation="RT" postsynapticPopulation="VPL" synapse="ampa">
            <connectionWD id="0" preCellId="../RT/0/L23_E_comp" postCellId="../VPL/0/L23_E_comp" weight="0.0967484563" delay="0ms"/>
        </projection>
        <projection id="proj_RT_VPM" presynapticPopulation="RT" postsynapticPopulation="VPM" synapse="ampa">
            <connectionWD id="0" preCellId="../RT/0/L23_E_comp" postCellId="../VPM/0/L23_E_comp" weight="0.4631760306" delay="0ms"/>
        </projection>
        <projection id="proj_RT_VPMpc" presynapticPopulation="RT" postsynapticPopulation="VPMpc" synapse="ampa">
            <connectionWD id="0" preCellId="../RT/0/L23_E_comp" postCellId="../VPMpc/0/L23_E_comp" weight="0.0784085205" delay="0ms"/>
        </projection>
        <projection id="proj_SPA_CM" presynapticPopulation="SPA" postsynapticPopulation="CM" synapse="ampa">
            <connectionWD id="0" preCellId="../SPA/0/L23_E_comp" postCellId="../CM/0/L23_E_comp" weight="0.0256242919" delay="0ms"/>
        </projection>
        <projection id="proj_SPA_IMD" presynapticPopulation="SPA" postsynapticPopulation="IMD" synapse="ampa">
            <connectionWD id="0" preCellId="../SPA/0/L23_E_comp" postCellId="../IMD/0/L23_E_comp" weight="0.0023675495" delay="0ms"/>
        </projection>
        <projection id="proj_SPA_PO" presynapticPopulation="SPA" postsynapticPopulation="PO" synapse="ampa">
            <connectionWD id="0" preCellId="../SPA/0/L23_E_comp" postCellId="../PO/0/L23_E_comp" weight="0.0022173584" delay="0ms"/>
        </projection>
        <projection id="proj_SPA_SMT" presynapticPopulation="SPA" postsynapticPopulation="SMT" synapse="ampa">
            <connectionWD id="0" preCellId="../SPA/0/L23_E_comp" postCellId="../SMT/0/L23_E_comp" weight="0.0566252363" delay="0ms"/>
        </projection>
        <projection id="proj_SPA_SPFp" presynapticPopulation="SPA" postsynapticPopulation="SPFp" synapse="ampa">
            <connectionWD id="0" preCellId="../SPA/0/L23_E_comp" postCellId="../SPFp/0/L23_E_comp" weight="0.0141601441" delay="0ms"/>
        </projection>
        <projection id="proj_SPA_VAL" presynapticPopulation="SPA" postsynapticPopulation="VAL" synapse="ampa">
            <connectionWD id="0" preCellId="../SPA/0/L23_E_comp" postCellId="../VAL/0/L23_E_comp" weight="0.0592854418" delay="0ms"/>
        </projection>
        <projection id="proj_SPA_VM" presynapticPopulation="SPA" postsynapticPopulation="VM" synapse="ampa">
            <connectionWD id="0" preCellId="../SPA/0/L23_E_comp" postCellId="../VM/0/L23_E_comp" weight="0.3885158893" delay="0ms"/>
        </projection>
        <projection id="proj_SPA_VPMpc" presynapticPopulation="SPA" postsynapticPopulation="VPMpc" synapse="ampa">
            <connectionWD id="0" preCellId="../SPA/0/L23_E_comp" postCellId="../VPMpc/0/L23_E_comp" weight="0.0469957239" delay="0ms"/>
        </projection>
        <projection id="proj_SPFm_CL" presynapticPopulation="SPFm" postsynapticPopulation="CL" synapse="ampa">
            <connectionWD id="0" preCellId="../SPFm/0/L23_E_comp" postCellId="../CL/0/L23_E_comp" weight="0.0501454416" delay="0ms"/>
        </projection>
        <projection id="proj_SPFm_PF" presynapticPopulation="SPFm" postsynapticPopulation="PF" synapse="ampa">
            <connectionWD id="0" preCellId="../SPFm/0/L23_E_comp" postCellId="../PF/0/L23_E_comp" weight="0.0604738405" delay="0ms"/>
        </projection>
        <projection id="proj_SPFm_SMT" presynapticPopulation="SPFm" postsynapticPopulation="SMT" synapse="ampa">
            <connectionWD id="0" preCellId="../SPFm/0/L23_E_comp" postCellId="../SMT/0/L23_E_comp" weight="0.0180975754" delay="0ms"/>
        </projection>
        <projection id="proj_SPFm_VAL" presynapticPopulation="SPFm" postsynapticPopulation="VAL" synapse="ampa">
            <connectionWD id="0" preCellId="../SPFm/0/L23_E_comp" postCellId="../VAL/0/L23_E_comp" weight="0.5692965072" delay="0ms"/>
        </projection>
        <projection id="proj_SPFm_VM" presynapticPopulation="SPFm" postsynapticPopulation="VM" synapse="ampa">
            <connectionWD id="0" preCellId="../SPFm/0/L23_E_comp" postCellId="../VM/0/L23_E_comp" weight="0.4294790984" delay="0ms"/>
        </projection>
        <projection id="proj_SPFm_VPL" presynapticPopulation="SPFm" postsynapticPopulation="VPL" synapse="ampa">
            <connectionWD id="0" preCellId="../SPFm/0/L23_E_comp" postCellId="../VPL/0/L23_E_comp" weight="0.0250417481" delay="0ms"/>
        </projection>
        <projection id="proj_SPFm_VPM" presynapticPopulation="SPFm" postsynapticPopulation="VPM" synapse="ampa">
            <connectionWD id="0" preCellId="../SPFm/0/L23_E_comp" postCellId="../VPM/0/L23_E_comp" weight="0.0441429133" delay="0ms"/>
        </projection>
        <projection id="proj_SPFm_VPMpc" presynapticPopulation="SPFm" postsynapticPopulation="VPMpc" synapse="ampa">
            <connectionWD id="0" preCellId="../SPFm/0/L23_E_comp" postCellId="../VPMpc/0/L23_E_comp" weight="0.0083355132" delay="0ms"/>
        </projection>
        <projection id="proj_SPFp_CL" presynapticPopulation="SPFp" postsynapticPopulation="CL" synapse="ampa">
            <connectionWD id="0" preCellId="../SPFp/0/L23_E_comp" postCellId="../CL/0/L23_E_comp" weight="0.035327623" delay="0ms"/>
        </projection>
        <projection id="proj_SPFp_CM" presynapticPopulation="SPFp" postsynapticPopulation="CM" synapse="ampa">
            <connectionWD id="0" preCellId="../SPFp/0/L23_E_comp" postCellId="../CM/0/L23_E_comp" weight="0.0456083304" delay="0ms"/>
        </projection>
        <projection id="proj_SPFp_IMD" presynapticPopulation="SPFp" postsynapticPopulation="IMD" synapse="ampa">
            <connectionWD id="0" preCellId="../SPFp/0/L23_E_comp" postCellId="../IMD/0/L23_E_comp" weight="0.0203943521" delay="0ms"/>
        </projection>
        <projection id="proj_SPFp_LH" presynapticPopulation="SPFp" postsynapticPopulation="LH" synapse="ampa">
            <connectionWD id="0" preCellId="../SPFp/0/L23_E_comp" postCellId="../LH/0/L23_E_comp" weight="0.0117519907" delay="0ms"/>
        </projection>
        <projection id="proj_SPFp_MGd" presynapticPopulation="SPFp" postsynapticPopulation="MGd" synapse="ampa">
            <connectionWD id="0" preCellId="../SPFp/0/L23_E_comp" postCellId="../MGd/0/L23_E_comp" weight="0.0137689216" delay="0ms"/>
        </projection>
        <projection id="proj_SPFp_PF" presynapticPopulation="SPFp" postsynapticPopulation="PF" synapse="ampa">
            <connectionWD id="0" preCellId="../SPFp/0/L23_E_comp" postCellId="../PF/0/L23_E_comp" weight="0.0601905137" delay="0ms"/>
        </projection>
        <projection id="proj_SPFp_PO" presynapticPopulation="SPFp" postsynapticPopulation="PO" synapse="ampa">
            <connectionWD id="0" preCellId="../SPFp/0/L23_E_comp" postCellId="../PO/0/L23_E_comp" weight="0.2243726819" delay="0ms"/>
        </projection>
        <projection id="proj_SPFp_POL" presynapticPopulation="SPFp" postsynapticPopulation="POL" synapse="ampa">
            <connectionWD id="0" preCellId="../SPFp/0/L23_E_comp" postCellId="../POL/0/L23_E_comp" weight="0.0267748053" delay="0ms"/>
        </projection>
        <projection id="proj_SPFp_PVT" presynapticPopulation="SPFp" postsynapticPopulation="PVT" synapse="ampa">
            <connectionWD id="0" preCellId="../SPFp/0/L23_E_comp" postCellId="../PVT/0/L23_E_comp" weight="0.005392231" delay="0ms"/>
        </projection>
        <projection id="proj_SPFp_RE" presynapticPopulation="SPFp" postsynapticPopulation="RE" synapse="ampa">
            <connectionWD id="0" preCellId="../SPFp/0/L23_E_comp" postCellId="../RE/0/L23_E_comp" weight="0.2267572711" delay="0ms"/>
        </projection>
        <projection id="proj_SPFp_RH" presynapticPopulation="SPFp" postsynapticPopulation="RH" synapse="ampa">
            <connectionWD id="0" preCellId="../SPFp/0/L23_E_comp" postCellId="../RH/0/L23_E_comp" weight="0.0228988783" delay="0ms"/>
        </projection>
        <projection id="proj_SPFp_SMT" presynapticPopulation="SPFp" postsynapticPopulation="SMT" synapse="ampa">
            <connectionWD id="0" preCellId="../SPFp/0/L23_E_comp" postCellId="../SMT/0/L23_E_comp" weight="0.0099405051" delay="0ms"/>
        </projection>
        <projection id="proj_SPFp_SPA" presynapticPopulation="SPFp" postsynapticPopulation="SPA" synapse="ampa">
            <connectionWD id="0" preCellId="../SPFp/0/L23_E_comp" postCellId="../SPA/0/L23_E_comp" weight="0.0317804184" delay="0ms"/>
        </projection>
        <projection id="proj_SPFp_SPFm" presynapticPopulation="SPFp" postsynapticPopulation="SPFm" synapse="ampa">
            <connectionWD id="0" preCellId="../SPFp/0/L23_E_comp" postCellId="../SPFm/0/L23_E_comp" weight="0.0323983936" delay="0ms"/>
        </projection>
        <projection id="proj_SPFp_VAL" presynapticPopulation="SPFp" postsynapticPopulation="VAL" synapse="ampa">
            <connectionWD id="0" preCellId="../SPFp/0/L23_E_comp" postCellId="../VAL/0/L23_E_comp" weight="0.0811656726" delay="0ms"/>
        </projection>
        <projection id="proj_SPFp_VM" presynapticPopulation="SPFp" postsynapticPopulation="VM" synapse="ampa">
            <connectionWD id="0" preCellId="../SPFp/0/L23_E_comp" postCellId="../VM/0/L23_E_comp" weight="0.0455693056" delay="0ms"/>
        </projection>
        <projection id="proj_SPFp_VPL" presynapticPopulation="SPFp" postsynapticPopulation="VPL" synapse="ampa">
            <connectionWD id="0" preCellId="../SPFp/0/L23_E_comp" postCellId="../VPL/0/L23_E_comp" weight="0.0361688044" delay="0ms"/>
        </projection>
        <projection id="proj_SPFp_VPM" presynapticPopulation="SPFp" postsynapticPopulation="VPM" synapse="ampa">
            <connectionWD id="0" preCellId="../SPFp/0/L23_E_comp" postCellId="../VPM/0/L23_E_comp" weight="0.0791106539" delay="0ms"/>
        </projection>
        <projection id="proj_SPFp_VPMpc" presynapticPopulation="SPFp" postsynapticPopulation="VPMpc" synapse="ampa">
            <connectionWD id="0" preCellId="../SPFp/0/L23_E_comp" postCellId="../VPMpc/0/L23_E_comp" weight="0.0478390464" delay="0ms"/>
        </projection>
        <projection id="proj_VAL_AMv" presynapticPopulation="VAL" postsynapticPopulation="AMv" synapse="ampa">
            <connectionWD id="0" preCellId="../VAL/0/L23_E_comp" postCellId="../AMv/0/L23_E_comp" weight="0.0019080197" delay="0ms"/>
        </projection>
        <projection id="proj_VAL_CL" presynapticPopulation="VAL" postsynapticPopulation="CL" synapse="ampa">
            <connectionWD id="0" preCellId="../VAL/0/L23_E_comp" postCellId="../CL/0/L23_E_comp" weight="0.0871464495" delay="0ms"/>
        </projection>
        <projection id="proj_VAL_LGd" presynapticPopulation="VAL" postsynapticPopulation="LGd" synapse="ampa">
            <connectionWD id="0" preCellId="../VAL/0/L23_E_comp" postCellId="../LGd/0/L23_E_comp" weight="0.0090046731" delay="0ms"/>
        </projection>
        <projection id="proj_VAL_LGv" presynapticPopulation="VAL" postsynapticPopulation="LGv" synapse="ampa">
            <connectionWD id="0" preCellId="../VAL/0/L23_E_comp" postCellId="../LGv/0/L23_E_comp" weight="0.029478759" delay="0ms"/>
        </projection>
        <projection id="proj_VAL_LP" presynapticPopulation="VAL" postsynapticPopulation="LP" synapse="ampa">
            <connectionWD id="0" preCellId="../VAL/0/L23_E_comp" postCellId="../LP/0/L23_E_comp" weight="0.0792180024" delay="0ms"/>
        </projection>
        <projection id="proj_VAL_MGm" presynapticPopulation="VAL" postsynapticPopulation="MGm" synapse="ampa">
            <connectionWD id="0" preCellId="../VAL/0/L23_E_comp" postCellId="../MGm/0/L23_E_comp" weight="0.0029814973" delay="0ms"/>
        </projection>
        <projection id="proj_VAL_MGv" presynapticPopulation="VAL" postsynapticPopulation="MGv" synapse="ampa">
            <connectionWD id="0" preCellId="../VAL/0/L23_E_comp" postCellId="../MGv/0/L23_E_comp" weight="0.0042988991" delay="0ms"/>
        </projection>
        <projection id="proj_VAL_MH" presynapticPopulation="VAL" postsynapticPopulation="MH" synapse="ampa">
            <connectionWD id="0" preCellId="../VAL/0/L23_E_comp" postCellId="../MH/0/L23_E_comp" weight="0.0003456387" delay="0ms"/>
        </projection>
        <projection id="proj_VAL_PP" presynapticPopulation="VAL" postsynapticPopulation="PP" synapse="ampa">
            <connectionWD id="0" preCellId="../VAL/0/L23_E_comp" postCellId="../PP/0/L23_E_comp" weight="0.0043150707" delay="0ms"/>
        </projection>
        <projection id="proj_VAL_PT" presynapticPopulation="VAL" postsynapticPopulation="PT" synapse="ampa">
            <connectionWD id="0" preCellId="../VAL/0/L23_E_comp" postCellId="../PT/0/L23_E_comp" weight="0.0011573972" delay="0ms"/>
        </projection>
        <projection id="proj_VAL_RE" presynapticPopulation="VAL" postsynapticPopulation="RE" synapse="ampa">
            <connectionWD id="0" preCellId="../VAL/0/L23_E_comp" postCellId="../RE/0/L23_E_comp" weight="0.0449611016" delay="0ms"/>
        </projection>
        <projection id="proj_VAL_RH" presynapticPopulation="VAL" postsynapticPopulation="RH" synapse="ampa">
            <connectionWD id="0" preCellId="../VAL/0/L23_E_comp" postCellId="../RH/0/L23_E_comp" weight="0.007136794" delay="0ms"/>
        </projection>
        <projection id="proj_VAL_SMT" presynapticPopulation="VAL" postsynapticPopulation="SMT" synapse="ampa">
            <connectionWD id="0" preCellId="../VAL/0/L23_E_comp" postCellId="../SMT/0/L23_E_comp" weight="0.0106621266" delay="0ms"/>
        </projection>
        <projection id="proj_VAL_SPFm" presynapticPopulation="VAL" postsynapticPopulation="SPFm" synapse="ampa">
            <connectionWD id="0" preCellId="../VAL/0/L23_E_comp" postCellId="../SPFm/0/L23_E_comp" weight="0.0052665922" delay="0ms"/>
        </projection>
        <projection id="proj_VAL_SPFp" presynapticPopulation="VAL" postsynapticPopulation="SPFp" synapse="ampa">
            <connectionWD id="0" preCellId="../VAL/0/L23_E_comp" postCellId="../SPFp/0/L23_E_comp" weight="0.0034467124" delay="0ms"/>
        </projection>
        <projection id="proj_VM_AD" presynapticPopulation="VM" postsynapticPopulation="AD" synapse="ampa">
            <connectionWD id="0" preCellId="../VM/0/L23_E_comp" postCellId="../AD/0/L23_E_comp" weight="0.0017744535" delay="0ms"/>
        </projection>
        <projection id="proj_VM_AV" presynapticPopulation="VM" postsynapticPopulation="AV" synapse="ampa">
            <connectionWD id="0" preCellId="../VM/0/L23_E_comp" postCellId="../AV/0/L23_E_comp" weight="0.0113108268" delay="0ms"/>
        </projection>
        <projection id="proj_VM_CL" presynapticPopulation="VM" postsynapticPopulation="CL" synapse="ampa">
            <connectionWD id="0" preCellId="../VM/0/L23_E_comp" postCellId="../CL/0/L23_E_comp" weight="0.0009410664" delay="0ms"/>
        </projection>
        <projection id="proj_VM_CM" presynapticPopulation="VM" postsynapticPopulation="CM" synapse="ampa">
            <connectionWD id="0" preCellId="../VM/0/L23_E_comp" postCellId="../CM/0/L23_E_comp" weight="0.0092148592" delay="0ms"/>
        </projection>
        <projection id="proj_VM_IMD" presynapticPopulation="VM" postsynapticPopulation="IMD" synapse="ampa">
            <connectionWD id="0" preCellId="../VM/0/L23_E_comp" postCellId="../IMD/0/L23_E_comp" weight="0.0177447785" delay="0ms"/>
        </projection>
        <projection id="proj_VM_LD" presynapticPopulation="VM" postsynapticPopulation="LD" synapse="ampa">
            <connectionWD id="0" preCellId="../VM/0/L23_E_comp" postCellId="../LD/0/L23_E_comp" weight="0.0361490596" delay="0ms"/>
        </projection>
        <projection id="proj_VM_LGd" presynapticPopulation="VM" postsynapticPopulation="LGd" synapse="ampa">
            <connectionWD id="0" preCellId="../VM/0/L23_E_comp" postCellId="../LGd/0/L23_E_comp" weight="0.0184104333" delay="0ms"/>
        </projection>
        <projection id="proj_VM_LGv" presynapticPopulation="VM" postsynapticPopulation="LGv" synapse="ampa">
            <connectionWD id="0" preCellId="../VM/0/L23_E_comp" postCellId="../LGv/0/L23_E_comp" weight="0.0581302034" delay="0ms"/>
        </projection>
        <projection id="proj_VM_LH" presynapticPopulation="VM" postsynapticPopulation="LH" synapse="ampa">
            <connectionWD id="0" preCellId="../VM/0/L23_E_comp" postCellId="../LH/0/L23_E_comp" weight="0.0507139009" delay="0ms"/>
        </projection>
        <projection id="proj_VM_LP" presynapticPopulation="VM" postsynapticPopulation="LP" synapse="ampa">
            <connectionWD id="0" preCellId="../VM/0/L23_E_comp" postCellId="../LP/0/L23_E_comp" weight="0.0841215824" delay="0ms"/>
        </projection>
        <projection id="proj_VM_MGd" presynapticPopulation="VM" postsynapticPopulation="MGd" synapse="ampa">
            <connectionWD id="0" preCellId="../VM/0/L23_E_comp" postCellId="../MGd/0/L23_E_comp" weight="0.0024576192" delay="0ms"/>
        </projection>
        <projection id="proj_VM_MGm" presynapticPopulation="VM" postsynapticPopulation="MGm" synapse="ampa">
            <connectionWD id="0" preCellId="../VM/0/L23_E_comp" postCellId="../MGm/0/L23_E_comp" weight="0.0065171307" delay="0ms"/>
        </projection>
        <projection id="proj_VM_MGv" presynapticPopulation="VM" postsynapticPopulation="MGv" synapse="ampa">
            <connectionWD id="0" preCellId="../VM/0/L23_E_comp" postCellId="../MGv/0/L23_E_comp" weight="0.0128469454" delay="0ms"/>
        </projection>
        <projection id="proj_VM_PF" presynapticPopulation="VM" postsynapticPopulation="PF" synapse="ampa">
            <connectionWD id="0" preCellId="../VM/0/L23_E_comp" postCellId="../PF/0/L23_E_comp" weight="0.060552693" delay="0ms"/>
        </projection>
        <projection id="proj_VM_PO" presynapticPopulation="VM" postsynapticPopulation="PO" synapse="ampa">
            <connectionWD id="0" preCellId="../VM/0/L23_E_comp" postCellId="../PO/0/L23_E_comp" weight="0.0431009128" delay="0ms"/>
        </projection>
        <projection id="proj_VM_POL" presynapticPopulation="VM" postsynapticPopulation="POL" synapse="ampa">
            <connectionWD id="0" preCellId="../VM/0/L23_E_comp" postCellId="../POL/0/L23_E_comp" weight="0.0179414488" delay="0ms"/>
        </projection>
        <projection id="proj_VM_PP" presynapticPopulation="VM" postsynapticPopulation="PP" synapse="ampa">
            <connectionWD id="0" preCellId="../VM/0/L23_E_comp" postCellId="../PP/0/L23_E_comp" weight="0.0075863941" delay="0ms"/>
        </projection>
        <projection id="proj_VM_PVT" presynapticPopulation="VM" postsynapticPopulation="PVT" synapse="ampa">
            <connectionWD id="0" preCellId="../VM/0/L23_E_comp" postCellId="../PVT/0/L23_E_comp" weight="0.0061988297" delay="0ms"/>
        </projection>
        <projection id="proj_VM_RE" presynapticPopulation="VM" postsynapticPopulation="RE" synapse="ampa">
            <connectionWD id="0" preCellId="../VM/0/L23_E_comp" postCellId="../RE/0/L23_E_comp" weight="0.0969329694" delay="0ms"/>
        </projection>
        <projection id="proj_VM_RH" presynapticPopulation="VM" postsynapticPopulation="RH" synapse="ampa">
            <connectionWD id="0" preCellId="../VM/0/L23_E_comp" postCellId="../RH/0/L23_E_comp" weight="0.0262764418" delay="0ms"/>
        </projection>
        <projection id="proj_VM_RT" presynapticPopulation="VM" postsynapticPopulation="RT" synapse="ampa">
            <connectionWD id="0" preCellId="../VM/0/L23_E_comp" postCellId="../RT/0/L23_E_comp" weight="0.3947880385" delay="0ms"/>
        </projection>
        <projection id="proj_VM_SMT" presynapticPopulation="VM" postsynapticPopulation="SMT" synapse="ampa">
            <connectionWD id="0" preCellId="../VM/0/L23_E_comp" postCellId="../SMT/0/L23_E_comp" weight="0.0198763113" delay="0ms"/>
        </projection>
        <projection id="proj_VM_SPA" presynapticPopulation="VM" postsynapticPopulation="SPA" synapse="ampa">
            <connectionWD id="0" preCellId="../VM/0/L23_E_comp" postCellId="../SPA/0/L23_E_comp" weight="0.0177121355" delay="0ms"/>
        </projection>
        <projection id="proj_VM_SPFm" presynapticPopulation="VM" postsynapticPopulation="SPFm" synapse="ampa">
            <connectionWD id="0" preCellId="../VM/0/L23_E_comp" postCellId="../SPFm/0/L23_E_comp" weight="0.0131558198" delay="0ms"/>
        </projection>
        <projection id="proj_VM_SPFp" presynapticPopulation="VM" postsynapticPopulation="SPFp" synapse="ampa">
            <connectionWD id="0" preCellId="../VM/0/L23_E_comp" postCellId="../SPFp/0/L23_E_comp" weight="0.0587668044" delay="0ms"/>
        </projection>
        <projection id="proj_VM_VM" presynapticPopulation="VM" postsynapticPopulation="VM" synapse="ampa">
            <connectionWD id="0" preCellId="../VM/0/L23_E_comp" postCellId="../VM/0/L23_E_comp" weight="0.0144112732" delay="0ms"/>
        </projection>
        <projection id="proj_VM_VPL" presynapticPopulation="VM" postsynapticPopulation="VPL" synapse="ampa">
            <connectionWD id="0" preCellId="../VM/0/L23_E_comp" postCellId="../VPL/0/L23_E_comp" weight="0.0745080347" delay="0ms"/>
        </projection>
        <projection id="proj_VPL_AMv" presynapticPopulation="VPL" postsynapticPopulation="AMv" synapse="ampa">
            <connectionWD id="0" preCellId="../VPL/0/L23_E_comp" postCellId="../AMv/0/L23_E_comp" weight="0.000552661" delay="0ms"/>
        </projection>
        <projection id="proj_VPL_CL" presynapticPopulation="VPL" postsynapticPopulation="CL" synapse="ampa">
            <connectionWD id="0" preCellId="../VPL/0/L23_E_comp" postCellId="../CL/0/L23_E_comp" weight="0.0932368713" delay="0ms"/>
        </projection>
        <projection id="proj_VPL_LGv" presynapticPopulation="VPL" postsynapticPopulation="LGv" synapse="ampa">
            <connectionWD id="0" preCellId="../VPL/0/L23_E_comp" postCellId="../LGv/0/L23_E_comp" weight="0.0012033704" delay="0ms"/>
        </projection>
        <projection id="proj_VPL_LH" presynapticPopulation="VPL" postsynapticPopulation="LH" synapse="ampa">
            <connectionWD id="0" preCellId="../VPL/0/L23_E_comp" postCellId="../LH/0/L23_E_comp" weight="0.024877202" delay="0ms"/>
        </projection>
        <projection id="proj_VPL_MGm" presynapticPopulation="VPL" postsynapticPopulation="MGm" synapse="ampa">
            <connectionWD id="0" preCellId="../VPL/0/L23_E_comp" postCellId="../MGm/0/L23_E_comp" weight="0.0038288889" delay="0ms"/>
        </projection>
        <projection id="proj_VPL_MGv" presynapticPopulation="VPL" postsynapticPopulation="MGv" synapse="ampa">
            <connectionWD id="0" preCellId="../VPL/0/L23_E_comp" postCellId="../MGv/0/L23_E_comp" weight="0.0076989883" delay="0ms"/>
        </projection>
        <projection id="proj_VPL_PO" presynapticPopulation="VPL" postsynapticPopulation="PO" synapse="ampa">
            <connectionWD id="0" preCellId="../VPL/0/L23_E_comp" postCellId="../PO/0/L23_E_comp" weight="0.2693656109" delay="0ms"/>
        </projection>
        <projection id="proj_VPL_POL" presynapticPopulation="VPL" postsynapticPopulation="POL" synapse="ampa">
            <connectionWD id="0" preCellId="../VPL/0/L23_E_comp" postCellId="../POL/0/L23_E_comp" weight="0.0130620972" delay="0ms"/>
        </projection>
        <projection id="proj_VPL_RH" presynapticPopulation="VPL" postsynapticPopulation="RH" synapse="ampa">
            <connectionWD id="0" preCellId="../VPL/0/L23_E_comp" postCellId="../RH/0/L23_E_comp" weight="0.0138491324" delay="0ms"/>
        </projection>
        <projection id="proj_VPL_SMT" presynapticPopulation="VPL" postsynapticPopulation="SMT" synapse="ampa">
            <connectionWD id="0" preCellId="../VPL/0/L23_E_comp" postCellId="../SMT/0/L23_E_comp" weight="0.0107507305" delay="0ms"/>
        </projection>
        <projection id="proj_VPL_SPFm" presynapticPopulation="VPL" postsynapticPopulation="SPFm" synapse="ampa">
            <connectionWD id="0" preCellId="../VPL/0/L23_E_comp" postCellId="../SPFm/0/L23_E_comp" weight="0.0019369407" delay="0ms"/>
        </projection>
        <projection id="proj_VPL_VM" presynapticPopulation="VPL" postsynapticPopulation="VM" synapse="ampa">
            <connectionWD id="0" preCellId="../VPL/0/L23_E_comp" postCellId="../VM/0/L23_E_comp" weight="0.0334387904" delay="0ms"/>
        </projection>
        <projection id="proj_VPM_MGd" presynapticPopulation="VPM" postsynapticPopulation="MGd" synapse="ampa">
            <connectionWD id="0" preCellId="../VPM/0/L23_E_comp" postCellId="../MGd/0/L23_E_comp" weight="0.0035730483" delay="0ms"/>
        </projection>
        <projection id="proj_VPM_PO" presynapticPopulation="VPM" postsynapticPopulation="PO" synapse="ampa">
            <connectionWD id="0" preCellId="../VPM/0/L23_E_comp" postCellId="../PO/0/L23_E_comp" weight="0.011896611" delay="0ms"/>
        </projection>
        <projection id="proj_VPM_POL" presynapticPopulation="VPM" postsynapticPopulation="POL" synapse="ampa">
            <connectionWD id="0" preCellId="../VPM/0/L23_E_comp" postCellId="../POL/0/L23_E_comp" weight="0.00991929" delay="0ms"/>
        </projection>
        <projection id="proj_VPM_RT" presynapticPopulation="VPM" postsynapticPopulation="RT" synapse="ampa">
            <connectionWD id="0" preCellId="../VPM/0/L23_E_comp" postCellId="../RT/0/L23_E_comp" weight="0.2400476535" delay="0ms"/>
        </projection>
        <projection id="proj_VPM_VPL" presynapticPopulation="VPM" postsynapticPopulation="VPL" synapse="ampa">
            <connectionWD id="0" preCellId="../VPM/0/L23_E_comp" postCellId="../VPL/0/L23_E_comp" weight="0.0295885812" delay="0ms"/>
        </projection>
        <projection id="proj_VPMpc_RT" presynapticPopulation="VPMpc" postsynapticPopulation="RT" synapse="ampa">
            <connectionWD id="0" preCellId="../VPMpc/0/L23_E_comp" postCellId="../RT/0/L23_E_comp" weight="0.7371693911" delay="0ms"/>
        </projection>
        <projection id="proj_VPMpc_VAL" presynapticPopulation="VPMpc" postsynapticPopulation="VAL" synapse="ampa">
            <connectionWD id="0" preCellId="../VPMpc/0/L23_E_comp" postCellId="../VAL/0/L23_E_comp" weight="0.0778330802" delay="0ms"/>
        </projection>
        <projection id="proj_VPMpc_VM" presynapticPopulation="VPMpc" postsynapticPopulation="VM" synapse="ampa">
            <connectionWD id="0" preCellId="../VPMpc/0/L23_E_comp" postCellId="../VM/0/L23_E_comp" weight="0.0781797397" delay="0ms"/>
        </projection>
        <projection id="proj_VPMpc_VPL" presynapticPopulation="VPMpc" postsynapticPopulation="VPL" synapse="ampa">
            <connectionWD id="0" preCellId="../VPMpc/0/L23_E_comp" postCellId="../VPL/0/L23_E_comp" weight="0.1390817254" delay="0ms"/>
        </projection>
        <inputList id="Stim_VPM" population="VPM" component="iclamp_0">
            <input id="0" target="../VPM/0/L23_E_comp" destination="synapses"/>
        </inputList>
    </network>
</neuroml>
