<Lems>

    <!-- Specify which component to run -->
    <Target component="sim1" />

    <!-- Include core NeuroML2 ComponentType definitions -->
    <Include file="Cells.xml" />
    <Include file="Networks.xml" />
    <Include file="Simulation.xml" />

    <Include file="Planar.xml" />

    <planarOscillator id="po1" a="1.5" tau="30ms" X0="2" Y0="-4"/>

    <network id="net1">
        <population id="Pop1" component="po1" size="1" />
    </network>

    <!-- End of NeuroML2 content -->

    <Simulation id="sim1" length="200ms" step="0.01ms" target="net1">

        <Display id="d1" title="Ex   LEMS" timeScale="1s" xmin="0" xmax="200" ymin="-2.5" ymax="2.5">
            <Line id="X" quantity="Pop1[0]/X" scale="1" color="#ee40FF" timeScale="1ms" />
            <Line id="Y" quantity="Pop1[0]/Y" scale="1" color="#BBA0AA" timeScale="1ms" />
        </Display>

    </Simulation>

</Lems>
